// SBML level 3 version 1
// dcterms:bibliographicCitation: http://identifiers.org/pubmed/12775757

model Leloup2003_CircClock_LD_REV_ERBalpha()
  // Leloup2003_CircClock_LD_REV-ERBalpha
  // This is model is according to the paperToward a detailed computational model for the mammalian circadian clock
  // In this model interlocked negative and positive regulation of Per,Cry,Bmal,REV-ERBalpha genes are all involved.The model is actually robust so the initial conditions are unimportant.We gave every entity zero as initial value,and start the graph at time=132h.
  // The simulation results in figure 8B can be reproduced by roadRunner online and Copasi. We use a ceiling function to simulate the day-light cycle.
  // This model originates from BioModels Database: A Database of Annotated Published Models. It is copyright (c) 2005-2011 The BioModels.net Team.
  // For more information see the terms of use.
  // To cite BioModels Database, please use: Li C, Donizelli M, Rodriguez N, Dharuri H, Endler L, Chelliah V, Li L, He E, Henry A, Stefan MI, Snoep JL, Hucka M, Le Novère N, Laibe C (2010) BioModels Database: An enhanced, curated and annotated resource for published quantitative kinetic models. BMC Syst Biol., 4:92.
  // isDerivedFrom kegg.pathway:hsa04710 biomodels.db:BIOMD0000000083 biomodels.db:MODEL4710748444 GO:0042752 taxonomy:40674 biomodels.db:BIOMD0000000021
  // hasVersion kegg.pathway:hsa04710
  // biomodels.db:BIOMD0000000083
  // biomodels.db:MODEL4710748444
  // isVersionOf GO:0042752
  // hasTaxon taxonomy:40674
  // model units - substance: substance, time: time, volume: volume, area: area, length: metre, extent: substance

  // Compartments:
  compartment cell = 1 volume;  // isVersionOf GO:0005623

  // Species:
  species Mb in cell = 0;  // encodes uniprot:O00327; isVersionOf CHEBI:33699
  species Bc in cell = 0;  // hasVersion uniprot:O00327
  species Bcp in cell = 0;  // hasVersion uniprot:O00327
  species Bn in cell = 0;  // hasVersion uniprot:O00327
  species Cc in cell = 0;  // hasVersion uniprot:Q8IV71; hasVersion uniprot:Q16526
  species Mc in cell = 0;  // encodes uniprot:Q16526; encodes uniprot:Q8IV71; isVersionOf CHEBI:33699
  species Ccp in cell = 0;  // hasVersion uniprot:Q8IV71; hasVersion uniprot:Q16526
  species Mp in cell = 0;  // encodes uniprot:P56645; encodes uniprot:O15055; encodes uniprot:O15534; isVersionOf CHEBI:33699
  species Pc in cell = 0;  // hasVersion uniprot:O15055; hasVersion uniprot:O15534; hasVersion uniprot:P56645
  species Pcp in cell = 0;  // hasVersion uniprot:O15534; hasVersion uniprot:O15055; hasVersion uniprot:P56645
  species PCc in cell = 0;  // hasPart uniprot:Q16526; hasPart uniprot:O15534; hasPart uniprot:Q8IV71; hasPart uniprot:P56645
  species PCcp in cell = 0;  // hasPart uniprot:P56645; hasPart uniprot:O15534; hasPart uniprot:Q16526; hasPart uniprot:Q8IV71
  species PCn in cell = 0;  // hasPart uniprot:Q8IV71; hasPart uniprot:Q16526; hasPart uniprot:P56645; hasPart uniprot:O15534
  species Bnp in cell = 0;  // hasVersion uniprot:O00327
  species PCnp in cell = 0;  // hasPart uniprot:P56645; hasPart uniprot:Q8IV71; hasPart uniprot:Q16526; hasPart uniprot:O15534
  species In in cell = 0;
  species Mr in cell = 0;  // encodes uniprot:Q6EEZ7; isVersionOf CHEBI:33699
  species Rc in cell = 0;  // hasVersion uniprot:Q6EEZ7
  species Rn in cell = 0;  // hasVersion uniprot:Q6EEZ7

  // Parameters:
  var LD;
  var vsp;
  vmP = 2.2;
  kdmp = 0.02;
  vsC = 2.2;
  vmC = 2;
  kdmc = 0.02;
  vsB = 1.8;
  vmB = 1.3;
  kdmb = 0.02;
  ksP = 1.2;
  V1P = 9.6;
  V2P = 0.6;
  k4 = 0.4;
  k3 = 0.8;
  kdn = 0.02;
  ksC = 3.2;
  V1C = 1.2;
  V2C = 0.2;
  kdnC = 0.02;
  KmB = 0.4;
  Kp = 1.006;
  Kdp = 0.1;
  VdPC = 3.4;
  vdCC = 1.4;
  Kd = 0.3;
  V1PC = 2.4;
  V2PC = 0.2;
  k2 = 0.4;
  k1 = 0.8;
  V3PC = 2.4;
  V4PC = 0.2;
  k7 = 1;
  k8 = 0.2;
  vdPCC = 1.4;
  vdPCN = 1.4;
  ksB = 0.32;
  V1B = 1.4;
  V2B = 0.2;
  k5 = 0.8;
  k6 = 0.4;
  vdBC = 3;
  V3B = 1.4;
  V4B = 0.4;
  vdBN = 3;
  vdIN = 1.6;
  vsR = 1.6;
  KAR = 0.6;
  vmR = 1.6;
  kmR = 0.4;
  kdmr = 0.02;
  ksR = 1.7;
  k9 = 0.8;
  k10 = 0.4;
  vdRC = 4.4;
  vdRN = 0.8;
  KAP = 0.6;
  KAC = 0.6;
  KmP = 0.3;
  KmC = 0.4;
  h = 2;
  m = 2;
  n = 2;

  // Assignment rules:
  LD := ceil(sin(pi*time/12 + 0.001)/2);
  vsp := 2.4 + (3 - 2.4)*LD;

  // Reactions:
  Mb_synthesized: => Mb; cell*(vsB*K^m/(K^m + Rn^m));  // modifiers: Rn; isVersionOf GO:0045892
    K = 1;
  Mb_translated_into_protein: => Bc; cell*ksB*Mb;  // modifiers: Mb; isVersionOf GO:0006412
  Mb_nonspecific_degradation: Mb => ; cell*kdmb*Mb;  // isVersionOf GO:0044257
  Bc_phosphorylation: Bc => Bcp; cell*(V1B*Bc/(Kp + Bc));  // isVersionOf GO:0006468
  reaction_4: Bc -> Bn; cell*(k5*Bc - k6*Bn); reaction_4 is "Bc transfered from cytosolic to nuclear";  // isVersionOf GO:0000060
  Mc_translated_into_protein: => Cc; cell*ksC*Mc;  // modifiers: Mc; isVersionOf GO:0006412
  Mc_nonspecific_degradation: Mc => ; cell*kdmc*Mc;  // isVersionOf GO:0044257
  Cc_phosphorylation: Cc => Ccp; cell*(V1C*Cc/(Kp + Cc));  // isVersionOf GO:0006468
  Ccp_specific_degradation: Ccp => ; cell*(vdCC*Ccp/(Kd + Ccp));  // isVersionOf GO:0008233
  Mp_synthesis: => Mp; cell*(vsp*Bn^n/(KAP^n + Bn^n));  // modifiers: Bn; isVersionOf GO:0045893
  Mp_translated_into_protein: => Pc; cell*ksP*Mp;  // modifiers: Mp; isVersionOf GO:0006412
  Pcp_specific_degradation: Pcp => ; cell*(VdPC*Pcp/(Kd + Pcp));  // isVersionOf GO:0008233
  Pc_phospholation: Pc => Pcp; cell*(V1P*Pc/(Kp + Pc));  // isVersionOf GO:0006468
  Cc_and_Pc_produce_PCc: Cc + Pc -> PCc; cell*(k3*Cc*Pc - k4*PCc);  // isVersionOf GO:0043623
  PCc_phospholation: PCc => PCcp; cell*(V1PC*PCc/(Kp + PCc));  // isVersionOf GO:0006468
  PCcp_specific_degradation: PCcp => ; cell*(vdPCC*PCcp/(Kd + PCcp));  // isVersionOf GO:0008233
  PCc_transfered_into_nuclear: PCc -> PCn; cell*(k1*PCc - k2*PCn);  // isVersionOf GO:0000060
  PCnp_nonspecific_degradation: PCnp => ; cell*kdn*PCnp;  // isVersionOf GO:0044257
  Bcp_nonspecific_degradation: Bcp => ; cell*kdn*Bcp;  // isVersionOf GO:0044257
  Bnp_nonspecific_degradation: Bnp => ; cell*kdn*Bnp;  // isVersionOf GO:0044257
  Mc_synthesis: => Mc; cell*(vsC*Bn^n/(KAC^n + Bn^n));  // modifiers: Bn; isPartOf GO:0045893
  PCn_phospholation: PCn => PCnp; cell*(V3PC*PCn/(Kp + PCn));  // isVersionOf GO:0006468
  Mp_nonspecific_degradation: Mp => ; cell*kdmp*Mp;  // isVersionOf GO:0044257
  reaction_23: PCn + Bn -> In; cell*(k7*PCn*Bn - k8*In); reaction_23 is "Per_Cry and Clock_Bmal form inactive complex";  // isVersionOf GO:0043623
  Mb_specific_degradation: Mb => ; cell*(vmB*Mb/(KmB + Mb));  // isVersionOf GO:0008233
  Mc_specific_degradation: Mc => ; cell*(vmC*Mc/(KmC + Mc));  // isVersionOf GO:0008233
  Mp_specific_degradation: Mp => ; cell*(vmP*Mp/(KmP + Mp));  // isVersionOf GO:0008233
  Pc_nonspecific_degradation: Pc => ; cell*kdn*Pc;  // isVersionOf GO:0044257
  Cc_nonspecific_degradation: Cc => ; cell*kdnC*Cc;  // isVersionOf GO:0044257
  Pcp_nonspecific_degradation: Pcp => ; cell*kdn*Pcp;  // isVersionOf GO:0044257
  Ccp_nonspecific_degradation: Ccp => ; cell*kdn*Ccp;  // isVersionOf GO:0044257
  PCcp_nonspecific_degradation: PCcp => ; cell*kdn*PCcp;  // isVersionOf GO:0044257
  PCc_nonspecific_degradation: PCc => ; cell*kdn*PCc;  // isVersionOf GO:0044257
  PCnp_specific_degradation: PCnp => ; cell*(vdPCN*PCnp/(Kd + PCnp));  // isVersionOf GO:0008233
  Bc_nonspecific_degradation: Bc => ; cell*kdn*Bc;  // isVersionOf GO:0044257
  Bcp_specific_degradation: Bcp => ; cell*(vdBC*Bcp/(Kd + Bcp));  // isVersionOf GO:0008233
  Bn_phospholation: Bn => Bnp; cell*(V3B*Bn/(Kp + Bn));  // isVersionOf GO:0006468
  Bnp_specific_degradation: Bnp => ; cell*(vdBN*Bnp/(Kd + Bnp));  // isVersionOf GO:0008233
  In_nonspecific_degration: In => ; cell*kdn*In;  // isVersionOf GO:0044257
  In_specific_degradation: In => ; cell*(vdIN*In/(Kd + In));  // isVersionOf GO:0008233
  Bn_nonspecific_degradation: Bn => ; cell*kdn*Bn;  // isVersionOf GO:0044257
  Bcp_dephospholation: Bcp => Bc; cell*(V2B*Bcp/(Kdp + Bcp));  // isVersionOf GO:0006470
  Bnp_dephospholation: Bnp => Bn; cell*(V4B*Bnp/(Kdp + Bnp));  // isVersionOf GO:0006470
  Ccp_dephospholation: Ccp => Cc; cell*(V2C*Ccp/(Kdp + Ccp));  // isPartOf GO:0006470
  Pcp_dephospholation: Pcp => Pc; cell*(V2P*Pcp/(Kdp + Pcp));  // isVersionOf GO:0006470
  PCnp_dephospholation: PCnp => PCn; cell*(V4PC*PCnp/(Kdp + PCnp));  // isVersionOf GO:0006470
  PCn_nonspecific_degradation: PCn => ; cell*kdn*PCn;  // isVersionOf GO:0044257
  PCcp_dephospholation: PCcp => PCc; cell*(V2PC*PCcp/(Kdp + PCcp));  // isVersionOf GO:0006470
  Mr_synthesized: => Mr; cell*(vsR*Bn^h/(KAR^h + Bn^h));  // modifiers: Bn; isPartOf GO:0045893
  Mr_nonspecific_degradation: Mr => ; cell*kdmr*Mr;  // isVersionOf GO:0044257
  Mr_specific_degradation: Mr => ; cell*(vmR*Mr/(kmR + Mr));  // isVersionOf GO:0008233
  Mr_translated_into_protein: => Rc; cell*ksR*Mr;  // modifiers: Mr; isVersionOf GO:0006412
  Rc_transfered_into_nuclear: Rc -> Rn; cell*(k9*Rc - k10*Rn);  // isVersionOf GO:0000060
  Rc_specific_degradation: Rc => ; cell*(vdRC*Rc/(Kd + Rc));  // isVersionOf GO:0008233
  Rc_nonspecific_degradation: Rc => ; cell*kdn*Rc;  // isVersionOf GO:0044257
  Rn_specific_degradation: Rn => ; cell*(vdRN*Rn/(Kd + Rn));  // isVersionOf GO:0008233
  Rn_nonspecific_degradation: Rn => ; cell*kdn*Rn;  // isVersionOf GO:0044257

  // Unit definitions:
  unit time = 3600 second;
  unit substance = 1e-9 mole;
  unit volume = litre;
  unit area = metre^2;
end
