// SBML level 3 version 1

model Novak1993_M_phase_control()
  // Novak1993 - Cell cycle M-phase control
  // The model reproduces Figure 9 of the paper. Please note that active MPF and cyclin concentrations in the paper are given relative to total cdc2 concentration (100nM). Active MPF (dimer_p) is the cyclin-cdc2 complex that is phosphorylated at Thr161. The earlier versions of the model was successfully tested on MathSBML and Jarnac, and the current version was checked in Copasi.
  // This model is described in the article:
  // Numerical analysis of a comprehensive model of M-phase control in Xenopus oocyte extracts and intact embryos.
  // Novak B, Tyson JJ.
  // J. Cell. Sci. 1993 Dec; 106 ( Pt 4): 1153-1168
  // Abstract:
  // To contribute to a deeper understanding of M-phase control in eukaryotic cells, we have constructed a model based on the biochemistry of M-phase promoting factor (MPF) in Xenopus oocyte extracts, where there is evidence for two positive feedback loops (MPF stimulates its own production by activating Cdc25 and inhibiting Wee1) and a negative feedback loop (MPF stimulates its own destruction by indirectly activating the ubiquitin pathway that degrades its cyclin subunit). To uncover the full dynamical possibilities of the control system, we translate the regulatory network into a set of differential equations and study these equations by graphical techniques and computer simulation. The positive feedback loops in the model account for thresholds and time lags in cyclin-induced and MPF-induced activation of MPF, and the model can be fitted quantitatively to these experimental observations. The negative feedback loop is consistent with observed time lags in MPF-induced cyclin degradation. Furthermore, our model indicates that there are two possible mechanisms for autonomous oscillations. One is driven by the positive feedback loops, resulting in phosphorylation and abrupt dephosphorylation of the Cdc2 subunit at an inhibitory tyrosine residue. These oscillations are typical of oocyte extracts. The other type is driven by the negative feedback loop, involving rapid cyclin turnover and negligible phosphorylation of the tyrosine residue of Cdc2. The early mitotic cycles of intact embryos exhibit such characteristics. In addition, by assuming that unreplicated DNA interferes with M-phase initiation by activating the phosphatases that oppose MPF in the positive feedback loops, we can simulate the effect of addition of sperm nuclei to oocyte extracts, and the lengthening of cycle times at the mid-blastula transition of intact embryos.
  // This model is hosted on BioModels Database and identified by: BIOMD0000000107.
  // To cite BioModels Database, please use: BioModels: ten-year anniversary .
  // To the extent possible under law, all copyright and related or neighbouring rights to this encoded model have been dedicated to the public domain worldwide. Please refer to CC0 Public Domain Dedication for more information.
  // biomodels.db:MODEL5876465734
  // biomodels.db:BIOMD0000000107
  // isDescribedBy pubmed:8126097
  // isHomologTo reactome:REACT_152
  // isVersionOf GO:0000278
  // hasTaxon taxonomy:8292
  // model units - substance: substance, time: time, volume: volume, area: area, length: metre, extent: substance

  // Compartments:
  compartment cytoplasm = 1 volume;  // GO:0005737

  // Species:
  species cyclin in cytoplasm = 100;  // interpro:IPR015454
  species dimer in cytoplasm = 0; dimer is "cyclin-cdc2 dimer";  // hasPart uniprot:P35567 interpro:IPR015454
  species dimer_p in cytoplasm = 0; dimer_p is "Thr161 phosphorylated dimer(active MPF)";  // hasPart uniprot:P35567 interpro:IPR015454
  species p_dimer in cytoplasm = 0; p_dimer is "Tyr15 phosphorylated dimer";  // hasPart uniprot:P35567 interpro:IPR015454
  species p_dimer_p in cytoplasm = 0; p_dimer_p is "Thr161-Tyr15 phosphorylated dimer";  // hasPart uniprot:P35567 interpro:IPR015454
  species cdc25_p in cytoplasm = 0; cdc25_p is "phosphorylated cdc25";  // isVersionOf uniprot:P30311
  species wee1_p in cytoplasm = 0; wee1_p is "phosphorylated wee1";  // isVersionOf uniprot:P47817
  species IE_p in cytoplasm = 0; IE_p is "phosphorylated intermediary enzyme";
  species UbE_star in cytoplasm = 0; UbE_star is "ubiquitin conjugating enzyme";  // isVersionOf GO:0031371
  species $cdc2 in cytoplasm;  // isVersionOf uniprot:P35567
  species $cdc25 in cytoplasm;  // isVersionOf uniprot:P30311
  species $wee1 in cytoplasm;  // isVersionOf uniprot:P47817
  species $IE in cytoplasm; IE is "intermediary enzyme";
  species $UbE in cytoplasm; UbE is "ubiquitin conjugating enzyme";  // isVersionOf GO:0031371

  // Parameters:
  total_cdc2 = 100;
  total_cdc25 = 1;
  total_wee1 = 1;
  total_IE = 1;
  total_UbE = 1;
  V25_prime = 0.1;
  V25_double_prime = 2;
  Vwee_prime = 0.1;
  Vwee_double_prime = 1;
  V2_prime = 0.015;
  V2_double_prime = 1;
  k1AA = 1;
  k3 = 0.01;
  kinh = 0.025;
  kcak = 0.25;
  ka = 0.01;
  K_a = 0.1;
  kbPPase = 0.125;
  K_b = 0.1;
  ke = 0.0133;
  K_e = 0.3;
  kfPPase = 0.1;
  K_f = 0.3;
  kg = 0.0065;
  K_g = 0.01;
  khPPAse = 0.087;
  K_h = 0.01;
  kc = 0.1;
  K_c = 0.01;
  kd_anti_IE = 0.095;
  K_d = 0.01;

  // Assignment rules:
  cdc2 := total_cdc2 - (dimer + p_dimer + p_dimer_p + dimer_p);
  cdc25 := total_cdc25 - cdc25_p;
  wee1 := total_wee1 - wee1_p;
  IE := total_IE - IE_p;
  UbE := total_UbE - UbE_star;
  k25 := V25_prime*(total_cdc25 - cdc25_p) + V25_double_prime*cdc25_p;
  kwee := Vwee_prime*wee1_p + Vwee_double_prime*(total_wee1 - wee1_p);
  k2 := V2_prime*(total_UbE - UbE_star) + V2_double_prime*UbE_star;
  total_cyclin := cyclin + dimer + dimer_p + p_dimer + p_dimer_p;
  Y15P := p_dimer + p_dimer_p;

  // Reactions:
  cyclin_synthesis: => cyclin; k1AA;  // isVersionOf GO:0006412
  R2: cyclin => ; k2*cyclin; R2 is "cyclin degradation";  // isVersionOf GO:0008054
  cyclin_cdc2_dimer_formation: cyclin + $cdc2 => dimer; k3*cyclin*cdc2; cyclin_cdc2_dimer_formation is "cyclin-cdc2 dimer formation";  // isVersionOf GO:0030332
  R4: dimer_p => dimer; kinh*dimer_p; R4 is "Thr161 dephosphorylation";  // isVersionOf GO:0045736
  R5: dimer => p_dimer; kwee*dimer; R5 is "Tyr15 phosphorylation";  // isVersionOf GO:0045736; isVersionOf reactome:REACT_6178; ec-code:2.7.10.2
  R6: dimer => dimer_p; kcak*dimer; R6 is "Thr161 phosphorylation";  // isVersionOf GO:0045737
  R7: dimer => ; k2*dimer; R7 is "cyclin degradation";  // isVersionOf GO:0008054
  R8: p_dimer => dimer; k25*p_dimer; R8 is "Tyr15 dephosphorylation";  // isVersionOf GO:0045737; isVersionOf reactome:REACT_6257.1; ec-code:3.1.3.48
  R9: p_dimer => p_dimer_p; kcak*p_dimer; R9 is "Thr161 phosphorylation";  // isVersionOf GO:0000079
  R10: p_dimer => ; k2*p_dimer; R10 is "cyclin degradation";  // isVersionOf GO:0008054
  R11: p_dimer_p => p_dimer; kinh*p_dimer_p; R11 is "Thr161 dephosphorylation";  // isVersionOf GO:0000079
  R12: dimer_p => p_dimer_p; kwee*dimer_p; R12 is "Tyr15 phosphorylation";  // modifiers: wee1; isVersionOf GO:0045736; isVersionOf reactome:REACT_6178; ec-code:2.7.10.2
  R13: p_dimer_p => dimer_p; k25*p_dimer_p; R13 is "Tyr15 dephosphorylation";  // modifiers: cdc25; isVersionOf GO:0045737; isVersionOf reactome:REACT_6257.1; ec-code:3.1.3.48
  R14: p_dimer_p => ; k2*p_dimer_p; R14 is "cyclin degradation";  // isVersionOf GO:0008054
  R15: dimer_p => ; k2*dimer_p; R15 is "cyclin degradation";  // isVersionOf GO:0008054
  cdc25_activation: $cdc25 => cdc25_p; ka*dimer_p*(total_cdc25 - cdc25_p)/(K_a + total_cdc25 - cdc25_p);  // modifiers: dimer_p; isVersionOf GO:0004674; ec-code:2.7.11.22
  cdc25_deactivation: cdc25_p => $cdc25; kbPPase*cdc25_p/(K_b + cdc25_p);  // isVersionOf GO:0044257
  wee1_deactivation: $wee1 => wee1_p; ke*dimer_p*(total_wee1 - wee1_p)/(K_e + total_wee1 - wee1_p);  // modifiers: dimer_p; ec-code:2.7.11.22; isVersionOf GO:0044257
  wee1_activation: wee1_p => $wee1; kfPPase*wee1_p/(K_f + wee1_p);
  intermediary_enzyme_activation: $IE => IE_p; kg*dimer_p*(total_IE - IE_p)/(K_g + total_IE - IE_p);  // modifiers: dimer_p; ec-code:2.7.11.22
  intermediary_enzyme_deactivation: IE_p => $IE; khPPAse*IE_p/(K_h + IE_p);  // isVersionOf GO:0044257
  R23: $UbE => UbE_star; kc*IE_p*(total_UbE - UbE_star)/(K_c + total_UbE - UbE_star); R23 is "ubiquitin conjugating enzyme activation";  // modifiers: IE_p
  R24: UbE_star => $UbE; kd_anti_IE*UbE_star/(K_d + UbE_star); R24 is "ubiquitin conjugating enzyme deactivation";

  // Unit definitions:
  unit substance = 1e-9 mole; substance is "nanomole";
  unit time = 60 second; time is "minutes";
  unit volume = litre;
  unit area = metre^2;
end
