// SBML level 3 version 1

model model_0000001()
  // Hatakeyama2003_MAPK
  // Figure4 and Figure5 can be simulated by Copasi. Figure4 can be simulated in MathSBML as well. There are some typos in the paper:K29=234, is it should k_29; Table2, reaction17, is there are "slash" missing in between the rate equation; reaction 33,"Akt-PI-PP" in the last term of denominator instead of "AktPI-P" . For plotting figure4, we create another extra parameter *_percent, and use assignment rule calculate percentage of each species.
  // To the extent possible under law, all copyright and related or neighbouring rights to this encoded model have been dedicated to the public domain worldwide. Please refer to CC0 Public Domain Dedication for more information.
  // In summary, you are entitled to use this encoded model in absolutely any manner you deem suitable, verbatim, or with modification, alone or embedded it in a larger context, redistribute it, commercially or not, in a restricted way or not.
  // To cite BioModels Database, please use: Li C, Donizelli M, Rodriguez N, Dharuri H, Endler L, Chelliah V, Li L, He E, Henry A, Stefan MI, Snoep JL, Hucka M, Le Novère N, Laibe C (2010) BioModels Database: An enhanced, curated and annotated resource for published quantitative kinetic models. BMC Syst Biol., 4:92.
  // biomodels.db:MODEL8256371999
  // biomodels.db:BIOMD0000000146
  // isDescribedBy pubmed:12691603
  // isDerivedFrom biomodels.db:BIOMD0000000019 biomodels.db:BIOMD0000000048 biomodels.db:BIOMD0000000010 pubmed:11772030
  // hasTaxon taxonomy:10026
  // hasPart GO:0043405 GO:0051896
  // model units - substance: substance, time: second, volume: volume, area: area, length: metre, extent: substance

  // Compartments:
  compartment cell = 1 volume;  // isVersionOf GO:0005623

  // Species:
  species Akt in cell = 10;  // isVersionOf interpro:IPR015744
  species AktPIP3 in cell = 0;  // hasPart CHEBI:16618 interpro:IPR015744
  species AktPIP in cell = 0;  // hasPart CHEBI:26034 interpro:IPR015744
  species AktPIPP in cell = 0;  // hasPart CHEBI:16152 interpro:IPR015744
  species ERK in cell = 1000;  // isVersionOf interpro:IPR003527; hasVersion interpro:IPR008349 interpro:IPR008350
  species ERKP in cell = 0;  // hasPart CHEBI:18367 interpro:IPR008349; hasPart CHEBI:18367 interpro:IPR008350
  species ERKPP in cell = 0;  // hasPart CHEBI:18361 interpro:IPR008349; hasPart CHEBI:18361 interpro:IPR008350
  species GS in cell = 10;
  // The value comes from the author of the paper
  species HRG in cell = 330;  // isVersionOf interpro:IPR002154
  species MEK in cell = 120;  // isVersionOf interpro:IPR003527
  species MEKP in cell = 0;  // hasPart CHEBI:18367 interpro:IPR003527
  species MEKPP in cell = 0;  // hasPart CHEBI:35782 interpro:IPR003527
  species PI3K in cell = 10;  // isVersionOf GO:0005942
  species PI3Kstar in cell = 0;  // isVersionOf GO:0005942
  species PIP3 in cell = 0;  // CHEBI:16618
  species R in cell = 80;  // isVersionOf GO:0043235; hasVersion uniprot:Q15303
  species RP in cell = 0;  // isVersionOf GO:0043235
  species RHRG in cell = 0;  // hasPart interpro:IPR002154 GO:0043235
  species RHRG2 in cell = 0;  // hasPart interpro:IPR002154 GO:0043235
  species RPI3K in cell = 0;  // hasPart GO:0043235 GO:0005942
  species RPI3Kstar in cell = 0;  // hasPart GO:0005942 GO:0043235
  species RShGS in cell = 0;
  species RShP in cell = 0;
  species RShc in cell = 0;
  species Raf in cell = 100;  // isHomologTo uniprot:P15056
  species Rafstar in cell = 0;  // isHomologTo uniprot:P15056
  species RasGDP in cell = 120;  // hasPart CHEBI:17552 interpro:IPR015592; isVersionOf interpro:IPR013753
  species RasGTP in cell = 0;  // hasPart CHEBI:15996 interpro:IPR015592; isVersionOf interpro:IPR013753
  species ShGS in cell = 0;
  species ShP in cell = 0;
  species Shc in cell = 1000;  // isVersionOf interpro:IPR001452 interpro:IPR000980
  species P_I in cell = 800;  // CHEBI:26034
  species internalization in cell = 0;
  species $E in cell = 7;
  species $MKP3 in cell = 2.4;  // isHomologTo uniprot:Q9DBB1
  species $PP2A in cell = 11.4;  // isVersionOf GO:0000159

  // Parameters:
  k1 = 0.0012;
  k2 = 0.01;
  k3 = 1;
  k5 = 0.1;
  k6 = 20;
  k7 = 60;
  k8 = 2040;
  k9 = 40.8;
  V10 = 0.0154;
  k11 = 0.222;
  V12 = 0.289;
  k13 = 1.53;
  k14 = 0.00673;
  k15 = 3.5;
  k16 = 0.058;
  k17 = 2.9;
  k20 = 0.3;
  k18 = 0.058;
  k19 = 9.5;
  k21 = 16;
  k22 = 0.27;
  k23 = 0.1;
  k24 = 9.85;
  k25 = 45.8;
  k27 = 16.9;
  V26 = 2620;
  V28 = 17000;
  k29 = 507;
  V30 = 20000;
  k31 = 0.107;
  V32 = 20000;
  k33 = 0.211;
  k34 = 0.001;
  k_1 = 0.00076;
  k_2 = 0.1;
  k_3 = 0.01;
  K4 = 50;
  k_5 = 1;
  k_6 = 5;
  k_7 = 546;
  k_8 = 15700;
  k_9 = 0;
  K10 = 340;
  K11 = 0.181;
  K12 = 0.0571;
  K13 = 11.7;
  K14 = 8.07;
  K15 = 317;
  K18 = 60;
  K19 = 146000;
  K20 = 160;
  K21 = 146000;
  K22 = 60;
  k_23 = 2;
  k_24 = 0.0985;
  k_25 = 0.047;
  K26 = 3680;
  K27 = 39.1;
  K28 = 9.02;
  K30 = 80000;
  K31 = 4.35;
  K32 = 80000;
  K33 = 12;
  k_34 = 0;
  V4 = 62.5;
  K17 = 317;
  K16 = 2200;
  k_29 = 234;

  // Assignment rules:
  // RP%
  RP_percent := (RP + RPI3K + RPI3Kstar + RShGS + RShP + RShc)*200/80;
  // ERKPP%
  ERKPP_percent := ERKPP*100/1000;
  // AktPP%
  AktPP_percent := AktPIPP*100/10;
  // MEKPP%
  MEKPP_percent := MEKPP*100/120;
  // ShP%
  ShP_percent := ShP*100/1000;
  // PI3Kstar%
  PI3Kstar_percent := PI3Kstar*100/10;
  // Rafstar%
  Rafstar_percent := Rafstar*100/100;

  // Reactions:
  reaction_0000001: R + HRG -> RHRG; cell*(k1*R*HRG - k_1*RHRG);  // isVersionOf GO:0005515 GO:0005102
  reaction_0000002: 2 RHRG -> RHRG2; cell*(k2*RHRG^2 - k_2*RHRG2);  // isVersionOf GO:0007171
  reaction_0000003: RHRG2 -> RP; cell*(k3*RHRG2 - k_3*RP);  // isVersionOf GO:0004672
  reaction_0000004: RP => RHRG2; cell*V4*RP/(K4 + RP);  // isVersionOf GO:0016311
  reaction_0000005: RP + Shc -> RShc; cell*(k5*RP*Shc - k_5*RShc);  // isVersionOf GO:0005515 GO:0004872
  reaction_0000006: RShc -> RShP; cell*(k6*RShc - k_6*RShP);  // isVersionOf GO:0004672 GO:0006468
  reaction_0000007: RShP + GS -> RShGS; cell*(k7*RShP*GS - k_7*RShGS);  // isVersionOf GO:0005515
  reaction_0000008: RShGS -> ShGS + RP; cell*(k8*RShGS - k_8*ShGS*RP);  // isVersionOf GO:0043241
  reaction_0000009: ShGS -> GS + ShP; cell*(k9*ShGS - k_9*GS*ShP);  // isVersionOf GO:0043241
  reaction_0000010: ShP => Shc; cell*V10*ShP/(K10 + ShP);  // isVersionOf GO:0016311
  reaction_0000011: RasGDP => RasGTP; cell*(k11*ShGS*RasGDP/(K11 + RasGDP));  // modifiers: ShGS; isVersionOf GO:0032320
  reaction_0000012: RasGTP => RasGDP; cell*(V12*RasGTP/(K12 + RasGTP));  // isVersionOf GO:0016311
  reaction_0000013: Raf => Rafstar; cell*(k13*RasGTP*Raf/(K13 + Raf));  // modifiers: RasGTP; isVersionOf GO:0032147
  reaction_0000014: Rafstar => Raf; cell*k14*(AktPIPP + E)*Rafstar/(K14 + Rafstar);  // modifiers: AktPIPP, E; isVersionOf GO:0006469
  reaction_0000015: MEK => MEKP; cell*k15*Rafstar*MEK/(K15*(1 + MEKP/K17) + MEK);  // modifiers: Rafstar; isVersionOf GO:0004672 GO:0006468
  reaction_0000016: MEKP => MEK; cell*k16*PP2A*MEKP/(K16*(1 + MEKPP/K18 + AktPIP/K31 + AktPIPP/K33) + MEKP);  // modifiers: MEKPP, AktPIP, AktPIPP, PP2A; isVersionOf GO:0016311
  reaction_0000017: MEKP => MEKPP; cell*k17*Rafstar*MEKP/(K17*(1 + MEK/K15) + MEKP);  // modifiers: MEK, Rafstar; isVersionOf GO:0004672 GO:0006468
  reaction_0000018: MEKPP => MEKP; cell*k18*PP2A*MEKPP/(K18*(1 + MEKP/K16 + AktPIPP/K31 + AktPIPP/K33) + MEKPP);  // modifiers: AktPIP, AktPIPP, PP2A; isVersionOf GO:0016311
  reaction_0000019: ERK => ERKP; cell*k19*MEKPP*ERK/(K19*(1 + ERKP/K21) + ERK);  // modifiers: MEKPP; isVersionOf GO:0004672 GO:0006468
  reaction_0000020: ERKP => ERK; cell*k20*MKP3*ERKP/(K20*(1 + ERKPP/K22) + ERKP);  // modifiers: ERKPP, MKP3; isVersionOf GO:0016311
  reaction_0000021: ERKP => ERKPP; cell*k21*MEKPP*ERKP/(K21*(1 + ERK/K19) + ERKP);  // modifiers: MEKPP, ERK; isVersionOf GO:0004672 GO:0006468
  reaction_0000022: ERKPP => ERKP; cell*k22*MKP3*ERKPP/(K22*(1 + ERKP/K20) + ERKPP);  // modifiers: MKP3; isVersionOf GO:0016311
  reaction_0000023: RP + PI3K -> RPI3K; cell*(k23*RP*PI3K - k_23*RPI3K);  // isVersionOf GO:0005515 GO:0004872
  reaction_0000024: RPI3K -> RPI3Kstar; cell*(k24*RPI3K - k_24*RPI3Kstar);  // isVersionOf GO:0032147
  reaction_0000025: RPI3Kstar -> RP + PI3Kstar; cell*(k25*RPI3Kstar - k_25*RP*PI3Kstar);  // isVersionOf GO:0043241
  reaction_0000026: PI3Kstar => PI3K; cell*V26*PI3Kstar/(K26 + PI3Kstar);  // isVersionOf GO:0006469
  reaction_0000029: PIP3 + Akt -> AktPIP3; cell*(k29*PIP3*Akt - k_29*AktPIP3);  // isVersionOf GO:0005515
  reaction_0000028: PIP3 => P_I; cell*(V28*PIP3/(K28 + PIP3));  // isVersionOf GO:0016311
  reaction_0000027: P_I => PIP3; cell*k27*PI3Kstar*P_I/(K27 + P_I);  // modifiers: PI3Kstar; isVersionOf GO:0016303
  reaction_0000030: AktPIP3 => AktPIP; cell*V30*AktPIP3/(K30*(1 + AktPIP/K32) + AktPIP3);  // isVersionOf GO:0016311
  reaction_0000031: AktPIP => AktPIP3; cell*k31*PP2A*AktPIP/(K31*(1 + MEKP/K16 + MEKPP/K18 + AktPIPP/K33) + AktPIP);  // modifiers: MEKP, MEKPP, AktPIPP, PP2A; isVersionOf GO:0004672 GO:0006468
  reaction_0000032: AktPIP => AktPIPP; cell*V32*AktPIP/(K32*(1 + AktPIP3/K30) + AktPIP);  // modifiers: AktPIP3; isVersionOf GO:0004672 GO:0006468
  reaction_0000033: AktPIPP => AktPIP; cell*k33*PP2A*AktPIPP/(K33*(1 + MEKP/K16 + MEKPP/K18 + AktPIP/K31) + AktPIPP);  // modifiers: MEKP, MEKPP, PP2A; isVersionOf GO:0016311
  reaction_0000034: RP -> internalization; cell*(k34*RP - k_34*internalization);  // isVersionOf GO:0031623

  // Unit definitions:
  unit substance = 1e-9 mole; substance is "nM";
  unit volume = litre;
  unit area = metre^2;
end
