// SBML level 3 version 1

model Eungdamrong2007_Ras_Activation()
  // The model reproduces the time profiles of Golgi Ras-GTP and plasma membrane Ras-GTP, subjected to a palmitoylation rate of 0.00015849 second inverse. This is depicted in Fig 5a and 5b for various palmitolylation rates, however the value used in this model is not present in the figure in the paper but corresponds to Fig S2 of the supplement. Model successfully reproduced using MathSBML. Please note that the units of volumetric species in this model are molecules/micrometer cubed, to convert this to microMolar as given in the paper, multiply the simulation result by 1/602.
  // To the extent possible under law, all copyright and related or neighbouring rights to this encoded model have been dedicated to the public domain worldwide. Please refer to CC0 Public Domain Dedication for more information.
  // In summary, you are entitled to use this encoded model in absolutely any manner you deem suitable, verbatim, or with modification, alone or embedded it in a larger context, redistribute it, commercially or not, in a restricted way or not.
  // To cite BioModels Database, please use: Li C, Donizelli M, Rodriguez N, Dharuri H, Endler L, Chelliah V, Li L, He E, Henry A, Stefan MI, Snoep JL, Hucka M, Le Novère N, Laibe C (2010) BioModels Database: An enhanced, curated and annotated resource for published quantitative kinetic models. BMC Syst Biol., 4:92.
  // biomodels.db:MODEL1633592197
  // biomodels.db:BIOMD0000000161
  // isDescribedBy pubmed:17098795
  // isDerivedFrom biomodels.db:MODEL9071122126 biomodels.db:BIOMD0000000075 pubmed:10579714 pubmed:10388786
  // hasTaxon taxonomy:131567
  // hasPart GO:0007265
  // model units - substance: substance, time: second, volume: volume, area: area, length: metre, extent: substance

  // Compartments:
  compartment EC = 1 volume;  // GO:0005576
  compartment cyt = 0.976 volume;  // GO:0005829
  compartment er = 0.012 volume;  // GO:0005783
  compartment Golgi = 0.012 volume;  // GO:0005794
  compartment PM = 0.6 um2;  // 2-D; GO:0005886
  compartment erMembrane = 0.0456 um2;  // 2-D; GO:0005789
  compartment GM = 0.048 um2;  // 2-D; GO:0000139

  // Species:
  species RasGTP_Golgi_GM in GM = 0;  // substance in molecules; hasPart uniprot:P62070
  species $EGF_EC in EC = 4.02136;  // substance in molecules
  species CAPRI_cyt in cyt = 30.1;  // substance in molecules
  species serca in erMembrane = 45;  // substance in molecules
  species PIP_PM in PM = 2857;  // substance in molecules; CHEBI:17526 kegg.compound:C01277
  species PI_PM in PM = 142857;  // substance in molecules; CHEBI:16749 kegg.compound:C01194
  species Shc_PM in PM = 186;  // substance in molecules; isVersionOf uniprot:P98077
  species CaCAPRI_PM_PM in PM = 0;  // substance in molecules; hasPart CHEBI:29108 kegg.compound:C00076
  species RactCa in erMembrane = 2.264;  // substance in molecules
  species Shc_star_PM in PM = 0;  // substance in molecules; isVersionOf uniprot:P98077
  species EGFR_PM in PM = 21;  // substance in molecules; isVersionOf uniprot:P00533
  species PLC_act_PM in PM = 0;  // substance in molecules
  species RasGTP_pal_cyt in cyt = 0;  // substance in molecules; hasPart uniprot:P62070
  species PLC_PM in PM = 100;  // substance in molecules
  species PIP2_PM in PM = 1072;  // substance in molecules; CHEBI:18348 kegg.compound:C04637
  species Activated_EGFR_PM in PM = 0;  // substance in molecules; isVersionOf uniprot:P00533
  species Ca in cyt = 0;  // substance in molecules; CHEBI:29108 kegg.compound:C00076
  species Ract in erMembrane = 9.056;  // substance in molecules
  species Rinh in erMembrane = 7.7825;  // substance in molecules
  species RinhCa in erMembrane = 3.5375;  // substance in molecules; hasPart CHEBI:29108 kegg.compound:C00076
  species IP3 in cyt = 0;  // substance in molecules; CHEBI:16595 kegg.compound:C01245
  species RasGDP_Golgi_GM in GM = 50;  // substance in molecules; hasPart uniprot:P62070
  species Ca_RasGRP_GM_GM in GM = 0;  // substance in molecules; hasPart CHEBI:29108 uniprot:O95267 kegg.compound:C00076
  species DAG_GM_GM in GM = 0;  // substance in molecules; CHEBI:18035 kegg.compound:C00165
  species RasGRP_DAG_GM in GM = 0;  // substance in molecules; hasPart uniprot:O95267
  species CaCAPRI_cyt in cyt = 0;  // substance in molecules; hasPart CHEBI:29108 kegg.compound:C00076
  species DAG_PM in PM = 2000;  // substance in molecules; CHEBI:18035 kegg.compound:C00165
  species RasGTP_depal_cyt in cyt = 0;  // substance in molecules; hasPart uniprot:P62070
  species RasGDP_depal_cyt in cyt = 0;  // substance in molecules; hasPart uniprot:P62070
  species RasGDP_pal_cyt in cyt = 0;  // substance in molecules; hasPart uniprot:P62070
  species Ca_PLCe_cyt in cyt = 0;  // substance in molecules; hasPart CHEBI:29108 kegg.compound:C00076
  species Ras_CaPLCe_GM in GM = 0;  // substance in molecules; hasPart CHEBI:29108 uniprot:P62070 kegg.compound:C00076
  species $PIP2_GM_GM in GM = 250;  // substance in molecules; CHEBI:18348 kegg.compound:C04637
  species $ER_erMembrane in erMembrane = 2;  // substance in molecules
  species Ca_ER in er = 120400;  // substance in molecules; CHEBI:29108 kegg.compound:C00076
  species Sos_cyt in cyt = 81.27;  // substance in molecules; isVersionOf uniprot:Q07889
  species Grb2_cyt in cyt = 502.67;  // substance in molecules; isVersionOf uniprot:P62993
  species PLCe_cyt in cyt = 12.04;  // substance in molecules
  species buffer_cyt in cyt = 120.4;  // substance in molecules
  species ca_buffer_cyt in cyt = 0;  // substance in molecules
  species SosGrb2_cyt in cyt = 99.33;  // substance in molecules; hasPart uniprot:P62993 uniprot:Q07889
  species SGS_PM in PM = 0;  // substance in molecules
  species RasGTP_PM in PM = 0;  // substance in molecules; hasPart uniprot:P62070
  species RasGDP_PM in PM = 400;  // substance in molecules; hasPart uniprot:P62070
  species RasGRP_cyt in cyt = 30.1;  // substance in molecules; isVersionOf uniprot:O95267
  species CaRasGRP1_cyt in cyt = 0;  // substance in molecules; hasPart CHEBI:29108 uniprot:O95267 kegg.compound:C00076

  // Parameters:
  KMOLE = 0.00166113 uM_um3_molecules_1;
  kStimSynPIP2_PIP2_synthesis = 0.01 s_1;
  tauPIP2syn_PIP2_synthesis = 0.05 s;
  PIP2syndecay_PIP2_synthesis = 10 s;
  PIP2_basal_PIP2_synthesis = 1072 molecules_um_2;
  kBasalSynPIP2_PIP2_synthesis = 0.045 s_1;
  Rate_PIP2Synbasal_PIP2_synthesis has s_1;
  Rate_PIP2SynStim_PIP2_synthesis has s_1;
  Vmax_Shc_phosphorylation has molecules_um_2_s_1;
  Vmax_RasGRP_DAG_GEF has molecules_um_2_s_1;
  Vmax_CAPRI_GAP has molecules_um_2_s_1;
  Vmax_CaRasGRP_act_RasGM has molecules_um_2_s_1;
  PIP_basal_PIP_synthesis = 2857 molecules_um_2;
  kBasalSynPIP_PIP_synthesis = 0.0015 s_1;
  kStimSynPIP_PIP_synthesis = 0.01 s_1;
  tauPIPsyn_PIP_synthesis = 0.05 s;
  PIPsyndecay_PIP_synthesis = 10 s;
  Ratebasal_PIPsyn_PIP_synthesis has s_1;
  Ratestim_PIPsyn_PIP_synthesis has s_1;
  Kon_reaction2 = 2.1 uM_1_s_1;
  dinh_reaction2 = 0.11 uM;
  Koff_reaction2 has s_1;
  Vmax_EGF_act_PLCgamma has molecules_um_2_s_1;
  dact_Ca_binds_IP3R = 0.2 s_1;
  Kr_Ca_binds_IP3R has s_1;
  Vmax_Sos_act_RasPM has molecules_um_2_s_1;

  // Assignment rules:
  Rate_PIP2Synbasal_PIP2_synthesis := piecewise(0.581*kBasalSynPIP2_PIP2_synthesis*(-1 + exp((PIP2_basal_PIP2_synthesis + (-PIP2_PM))*(1/PIP2_basal_PIP2_synthesis))), PIP2_PM < PIP2_basal_PIP2_synthesis, 0);
  Rate_PIP2SynStim_PIP2_synthesis := piecewise(kStimSynPIP2_PIP2_synthesis*exp(-((time + (-tauPIP2syn_PIP2_synthesis))*(1/PIP2syndecay_PIP2_synthesis))), time > tauPIP2syn_PIP2_synthesis, 0);
  Vmax_Shc_phosphorylation := 0.2*Activated_EGFR_PM;
  Vmax_RasGRP_DAG_GEF := 0.05*RasGRP_DAG_GM;
  Vmax_CAPRI_GAP := 10*CaCAPRI_PM_PM;
  Vmax_CaRasGRP_act_RasGM := 0.01*Ca_RasGRP_GM_GM;
  Ratebasal_PIPsyn_PIP_synthesis := piecewise(0.581*kBasalSynPIP_PIP_synthesis*(-1 + exp((PIP_basal_PIP_synthesis + (-PIP_PM))*(1/PIP_basal_PIP_synthesis))), PIP_PM < PIP_basal_PIP_synthesis, 0);
  Ratestim_PIPsyn_PIP_synthesis := piecewise(kStimSynPIP_PIP_synthesis*exp(-((time + (-tauPIPsyn_PIP_synthesis))*(1/PIPsyndecay_PIP_synthesis))), time > tauPIPsyn_PIP_synthesis, 0);
  Koff_reaction2 := dinh_reaction2*Kon_reaction2;
  Vmax_EGF_act_PLCgamma := 0.3*Activated_EGFR_PM;
  Kr_Ca_binds_IP3R := 1000*dact_Ca_binds_IP3R;
  Vmax_Sos_act_RasPM := 0.02*SGS_PM;

  // Reactions:
  PIP2_synthesis: PIP_PM -> PIP2_PM; (Rate_PIP2Synbasal_PIP2_synthesis + Rate_PIP2SynStim_PIP2_synthesis)*PIP_PM*PM;  // GO:0016308
    PIP2_synthesis_I = 0 pA_um_2;
  Shc_phosphorylation: Shc_PM -> Shc_star_PM; Vmax_Shc_phosphorylation*Shc_PM*(1/(Shc_phosphorylation_Km + Shc_PM))*PM;  // modifiers: Activated_EGFR_PM; isVersionOf GO:0006468
    Shc_phosphorylation_I = 0 pA_um_2; Shc_phosphorylation_Km = 1032 molecules_um_2;
  Ca_bind_CAPRI: Ca + CAPRI_cyt -> CaCAPRI_cyt; (Ca_bind_CAPRI_Kf*0.00166113*Ca*0.00166113*CAPRI_cyt + (-(Ca_bind_CAPRI_Kr*0.00166113*CaCAPRI_cyt)))*cyt*1*(1/KMOLE);  // isVersionOf GO:0005509
    Ca_bind_CAPRI_Kf = 0.1 uM_1_s_1; Ca_bind_CAPRI_Kr = 0.5 s_1;
  IP3_degradation: IP3 -> ; kIP3deg*(0.00166113*IP3 + (-IP3_basal))*cyt*1*(1/KMOLE);
    kIP3deg = 0.5 s_1; IP3_basal = 0 uM;
  RasGTP_depal_translocate: RasGTP_depal_cyt -> RasGTP_Golgi_GM; (RasGTP_depal_translocate_Kf*0.00166113*RasGTP_depal_cyt + (-(RasGTP_depal_translocate_Kr*RasGTP_Golgi_GM)))*GM;  // isVersionOf GO:0006886
    RasGTP_depal_translocate_I = 0 pA_um_2; RasGTP_depal_translocate_Kf = 120 molecules_um_2_uM_1_s_1; RasGTP_depal_translocate_Kr = 0.01 s_1;
  ca_bind_rasGRP: Ca + RasGRP_cyt -> CaRasGRP1_cyt; (ca_bind_rasGRP_Kf*0.00166113*Ca*0.00166113*RasGRP_cyt + (-(ca_bind_rasGRP_Kr*0.00166113*CaRasGRP1_cyt)))*cyt*1*(1/KMOLE);  // isVersionOf GO:0005509
    ca_bind_rasGRP_Kf = 0.1 uM_1_s_1; ca_bind_rasGRP_Kr = 0.5 s_1;
  RasGRP_DAG_GEF: RasGDP_Golgi_GM -> RasGTP_Golgi_GM; Vmax_RasGRP_DAG_GEF*RasGDP_Golgi_GM*(1/(RasGRP_DAG_GEF_Km + RasGDP_Golgi_GM))*GM;  // modifiers: RasGRP_DAG_GM; isVersionOf GO:0005085
    RasGRP_DAG_GEF_I = 0 pA_um_2; RasGRP_DAG_GEF_Km = 600 molecules_um_2;
  rasGTP_pal_translocation: RasGTP_pal_cyt -> RasGTP_PM; (rasGTP_pal_translocation_Kf*0.00166113*RasGTP_pal_cyt + (-(rasGTP_pal_translocation_Kr*RasGTP_PM)))*PM;  // isVersionOf GO:0006886
    rasGTP_pal_translocation_I = 0 pA_um_2; rasGTP_pal_translocation_Kf = 120 molecules_um_2_uM_1_s_1; rasGTP_pal_translocation_Kr = 0.01 s_1;
  PLCg_dephos: PLC_act_PM -> PLC_PM; (PLCg_dephos_Kf*PLC_act_PM + (-(PLCg_dephos_Kr*PLC_PM)))*PM;  // isVersionOf GO:0010519
    PLCg_dephos_I = 0 pA_um_2; PLCg_dephos_Kf = 0.2 s_1; PLCg_dephos_Kr = 0 s_1;
  basal_GAP: RasGTP_PM -> RasGDP_PM; (basal_GAP_Kf*RasGTP_PM + (-(basal_GAP_Kr*RasGDP_PM)))*PM;  // isVersionOf GO:0005099
    basal_GAP_I = 0 pA_um_2; basal_GAP_Kf = 0.0001 s_1; basal_GAP_Kr = 0 s_1;
  CAPRI_translocation: CaCAPRI_cyt -> CaCAPRI_PM_PM; (CAPRI_translocation_Kf*0.00166113*CaCAPRI_cyt + (-(CAPRI_translocation_Kr*CaCAPRI_PM_PM)))*PM;  // isVersionOf GO:0006886
    CAPRI_translocation_I = 0 pA_um_2; CAPRI_translocation_Kf = 120 molecules_um_2_uM_1_s_1; CAPRI_translocation_Kr = 0.1 s_1;
  reaction5: DAG_GM_GM + RasGRP_cyt -> RasGRP_DAG_GM; (reaction5_Kf*DAG_GM_GM*0.00166113*RasGRP_cyt + (-(reaction5_Kr*RasGRP_DAG_GM)))*GM;  // isVersionOf GO:0019992
    reaction5_I = 0 pA_um_2; reaction5_Kf = 0.5 uM_1_s_1; reaction5_Kr = 0.1 s_1;
  RasGDP_pal: RasGDP_Golgi_GM -> RasGDP_pal_cyt; (RasGDP_pal_Kf*RasGDP_Golgi_GM + (-(RasGDP_pal_Kr*0.00166113*RasGDP_pal_cyt)))*GM;  // isVersionOf GO:0006886
    RasGDP_pal_I = 0 pA_um_2; RasGDP_pal_Kf = 0.015 s_1; RasGDP_pal_Kr = 1e-5 molecules_um_2_uM_1_s_1;
  CAPRI_GAP: RasGTP_PM -> RasGDP_PM; Vmax_CAPRI_GAP*RasGTP_PM*(1/(CAPRI_GAP_Km + RasGTP_PM))*PM;  // modifiers: CaCAPRI_PM_PM; isVersionOf GO:0003924
    CAPRI_GAP_I = 0 pA_um_2; CAPRI_GAP_Km = 1200 molecules_um_2;
  RasGDPpal_translocation: RasGDP_pal_cyt -> RasGDP_PM; (RasGDPpal_translocation_Kf*0.00166113*RasGDP_pal_cyt + (-(RasGDPpal_translocation_Kr*RasGDP_PM)))*PM;  // isVersionOf GO:0006886
    RasGDPpal_translocation_I = 0 pA_um_2; RasGDPpal_translocation_Kf = 120 molecules_um_2_uM_1_s_1; RasGDPpal_translocation_Kr = 0.01 s_1;
  sos_grb2_binding: Sos_cyt + Grb2_cyt -> SosGrb2_cyt; (sos_grb2_binding_Kf*0.00166113*Sos_cyt*0.00166113*Grb2_cyt + (-(sos_grb2_binding_Kr*0.00166113*SosGrb2_cyt)))*cyt*1*(1/KMOLE);  // isVersionOf GO:0005515
    sos_grb2_binding_Kf = 0.025 uM_1_s_1; sos_grb2_binding_Kr = 0.0168 s_1;
  RasGDP_depal_translocate: RasGDP_depal_cyt -> RasGDP_Golgi_GM; (RasGDP_depal_translocate_Kf*0.00166113*RasGDP_depal_cyt + (-(RasGDP_depal_translocate_Kr*RasGDP_Golgi_GM)))*GM;  // isVersionOf GO:0006886
    RasGDP_depal_translocate_I = 0 pA_um_2; RasGDP_depal_translocate_Kf = 120 molecules_um_2_uM_1_s_1; RasGDP_depal_translocate_Kr = 0.01 s_1;
  Ras_GTP_palm1: RasGTP_Golgi_GM -> RasGTP_pal_cyt; (Ras_GTP_palm1_Kf*RasGTP_Golgi_GM + (-(Ras_GTP_palm1_Kr*0.00166113*RasGTP_pal_cyt)))*GM;  // isVersionOf GO:0006886
    Ras_GTP_palm1_I = 0 pA_um_2; Ras_GTP_palm1_Kf = 0.0001584893 s_1; Ras_GTP_palm1_Kr = 1e-5 molecules_um_2_uM_1_s_1;
  RasPal_basal_GAP: RasGTP_pal_cyt -> RasGDP_pal_cyt; (RasPal_basal_GAP_Kf*0.00166113*RasGTP_pal_cyt + (-(RasPal_basal_GAP_Kr*0.00166113*RasGDP_pal_cyt)))*cyt*1*(1/KMOLE);  // isVersionOf GO:0003924
    RasPal_basal_GAP_Kf = 0.0001 s_1; RasPal_basal_GAP_Kr = 0 s_1;
  basal_cyt_depal_GEF: RasGTP_depal_cyt -> RasGDP_depal_cyt; (basal_cyt_depal_GEF_Kf*0.00166113*RasGTP_depal_cyt + (-(basal_cyt_depal_GEF_Kr*0.00166113*RasGDP_depal_cyt)))*cyt*1*(1/KMOLE);  // isVersionOf GO:0003924
    basal_cyt_depal_GEF_Kf = 0.0001 s_1; basal_cyt_depal_GEF_Kr = 0 s_1;
  caPLCe_gen_DAG: $PIP2_GM_GM -> DAG_GM_GM + IP3; kact*PIP2_GM_GM*Ras_CaPLCe_GM*GM;  // modifiers: Ras_CaPLCe_GM; GO:0006651 GO:0004435
    caPLCe_gen_DAG_I = 0 pA_um_2; kact = 1.18 um2_molecules_1_s_1;
  CaRasGRP_act_RasGM: RasGDP_Golgi_GM -> RasGTP_Golgi_GM; Vmax_CaRasGRP_act_RasGM*RasGDP_Golgi_GM*(1/(CaRasGRP_act_RasGM_Km + RasGDP_Golgi_GM))*GM;  // modifiers: Ca_RasGRP_GM_GM; isVersionOf GO:0005085
    CaRasGRP_act_RasGM_I = 0 pA_um_2; CaRasGRP_act_RasGM_Km = 1200 molecules_um_2;
  PIP2_hydrolysis: PIP2_PM -> DAG_PM + IP3; k_PIP2hyd*PIP2_PM*PLC_act_PM*PM;  // modifiers: PLC_act_PM; GO:0004435
    PIP2_hydrolysis_I = 0 pA_um_2; k_PIP2hyd = 1.188 um2_molecules_1_s_1;
  Sos_activation: SosGrb2_cyt + Shc_star_PM -> SGS_PM; (Sos_activation_Kf*0.00166113*SosGrb2_cyt*Shc_star_PM + (-(Sos_activation_Kr*SGS_PM)))*PM;  // isVersionOf GO:0005515
    Sos_activation_I = 0 pA_um_2; Sos_activation_Kf = 90 uM_1_s_1; Sos_activation_Kr = 0.1 s_1;
  PIP_synthesis: PI_PM -> PIP_PM; (Ratebasal_PIPsyn_PIP_synthesis + Ratestim_PIPsyn_PIP_synthesis)*PI_PM*PM;  // GO:0004430
    PIP_synthesis_I = 0 pA_um_2;
  EGF_internalization: Activated_EGFR_PM -> ; EGF_internalization_Kf*Activated_EGFR_PM*PM;  // isVersionOf GO:0007176
    EGF_internalization_I = 0 pA_um_2; EGF_internalization_Kf = 0.002 s_1; EGF_internalization_Kr = 0 molecules_um_2_s_1;
  calcium_buffer: buffer_cyt + Ca -> ca_buffer_cyt; (calcium_buffer_Kf*0.00166113*buffer_cyt*0.00166113*Ca + (-(calcium_buffer_Kr*0.00166113*ca_buffer_cyt)))*cyt*1*(1/KMOLE);
    calcium_buffer_Kf = 50 uM_1_s_1; calcium_buffer_Kr = 10 s_1;
  RasGM_basal_GAP: RasGTP_Golgi_GM -> RasGDP_Golgi_GM; Vmax*RasGTP_Golgi_GM*(1/(RasGM_basal_GAP_Km + RasGTP_Golgi_GM))*GM;  // isVersionOf GO:0003924
    RasGM_basal_GAP_I = 0 pA_um_2; RasGM_basal_GAP_Km = 600 molecules_um_2; Vmax = 1 molecules_um_2_s_1;
  reaction0: Shc_star_PM -> Shc_PM; (reaction0_Kf*Shc_star_PM + (-(reaction0_Kr*Shc_PM)))*PM;
    reaction0_I = 0 pA_um_2; reaction0_Kf = 0.5 s_1; reaction0_Kr = 0 s_1;
  EGFR_binding: $EGF_EC + EGFR_PM -> Activated_EGFR_PM; (EGFR_binding_Kf*0.00166113*EGF_EC*EGFR_PM + (-(EGFR_binding_Kr*Activated_EGFR_PM)))*PM;  // GO:0045741
    EGFR_binding_I = 0 pA_um_2; EGFR_binding_Kf = 1 uM_1_s_1; EGFR_binding_Kr = 0.01 s_1;
  ca_act_PLCe: Ca + PLCe_cyt -> Ca_PLCe_cyt; (ca_act_PLCe_Kf*0.00166113*Ca*0.00166113*PLCe_cyt + (-(ca_act_PLCe_Kr*0.00166113*Ca_PLCe_cyt)))*cyt*1*(1/KMOLE);  // isVersionOf GO:0005509
    ca_act_PLCe_Kf = 3 uM_1_s_1; ca_act_PLCe_Kr = 1 s_1;
  ras_act_PLCe: RasGTP_Golgi_GM + Ca_PLCe_cyt -> Ras_CaPLCe_GM; (ras_act_PLCe_Kf*RasGTP_Golgi_GM*0.00166113*Ca_PLCe_cyt + (-(ras_act_PLCe_Kr*Ras_CaPLCe_GM)))*GM;
    ras_act_PLCe_I = 0 pA_um_2; ras_act_PLCe_Kf = 15 uM_1_s_1; ras_act_PLCe_Kr = 1 s_1;
  RasGDP_depal2: RasGDP_PM -> RasGDP_depal_cyt; (RasGDP_depal2_Kf*RasGDP_PM + (-(RasGDP_depal2_Kr*0.00166113*RasGDP_depal_cyt)))*PM;  // isVersionOf GO:0006886
    RasGDP_depal2_I = 0 pA_um_2; RasGDP_depal2_Kf = 0.0001 s_1; RasGDP_depal2_Kr = 0 molecules_um_2_uM_1_s_1;
  CaRasGRP_translocation: CaRasGRP1_cyt -> Ca_RasGRP_GM_GM; (CaRasGRP_translocation_Kf*0.00166113*CaRasGRP1_cyt + (-(CaRasGRP_translocation_Kr*Ca_RasGRP_GM_GM)))*GM;  // isVersionOf GO:0006886
    CaRasGRP_translocation_I = 0 pA_um_2; CaRasGRP_translocation_Kf = 10 molecules_um_2_uM_1_s_1; CaRasGRP_translocation_Kr = 5 s_1;
  reaction2: Rinh + Ca -> RinhCa; (Kon_reaction2*Rinh*0.00166113*Ca + (-(Koff_reaction2*RinhCa)))*erMembrane;  // isVersionOf GO:0005509
    reaction2_I = 0 pA_um_2;
  EGF_act_PLCgamma: PLC_PM -> PLC_act_PM; Vmax_EGF_act_PLCgamma*PLC_PM*(1/(EGF_act_PLCgamma_Km + PLC_PM))*PM;  // modifiers: Activated_EGFR_PM
    EGF_act_PLCgamma_I = 0 pA_um_2; EGF_act_PLCgamma_Km = 410 molecules_um_2;
  Ca_binds_IP3R: Ract + Ca -> RactCa; (Ract*Ca_binds_IP3R_Kf*0.00166113*Ca + (-(Kr_Ca_binds_IP3R*RactCa)))*erMembrane;  // isVersionOf GO:0005509
    Ca_binds_IP3R_I = 0 pA_um_2; Ca_binds_IP3R_Kf = 1000 uM_1_s_1;
  reaction7: DAG_GM_GM -> ; reaction7_Kf*DAG_GM_GM*GM;  // GO:0046340
    reaction7_I = 0 pA_um_2; reaction7_Kf = 0.25 s_1; reaction7_Kr = 0 molecules_um_2_s_1;
  Sos_act_RasPM: RasGDP_PM -> RasGTP_PM; Vmax_Sos_act_RasPM*RasGDP_PM*(1/(Sos_act_RasPM_Km + RasGDP_PM))*PM;  // modifiers: SGS_PM; isVersionOf GO:0003924
    Sos_act_RasPM_I = 0 pA_um_2; Sos_act_RasPM_Km = 600 molecules_um_2;
  flux1: Ca -> Ca_ER; ER_erMembrane*serca*vP*0.00166113*Ca*0.00166113*Ca*(1/(kP*kP + 0.00166113*Ca*0.00166113*Ca))*erMembrane*1*(1/KMOLE);  // modifiers: ER_erMembrane, serca; GO:0006816
    flux1_I = 0 pA_um_2; vP = 0.0664 _one__0E_33_item_2_m2_mol_s_1; kP = 0.27;
  flux0: Ca -> Ca_ER; -(0.25*ER_erMembrane*(RactCa + Ract)*(0.00166113*Ca_ER + (-(0.00166113*Ca)))*(0.00166113*IP3*RactCa*Rinh*(1/(0.00166113*IP3 + dI))*(1/(RactCa + Ract))*(1/(RinhCa + Rinh)))^3*singleChanFlux)*erMembrane*1*(1/KMOLE);  // modifiers: ER_erMembrane, RactCa, Ract, IP3, Rinh, RinhCa; GO:0006816
    flux0_I = 0 pA_um_2; dI = 0.8 uM; singleChanFlux = 4.69 _one__0E_30_item_2_m5_s_1;
  flux2: Ca -> Ca_ER; -(ER_erMembrane*(0.00166113*Ca_ER + (-(0.00166113*Ca)))*vL)*erMembrane*1*(1/KMOLE);  // modifiers: ER_erMembrane; GO:0006816
    flux2_I = 0 pA_um_2; vL = 3.16e-5 um3_molecules_1_s_1;
  Ras_PM_depal1: RasGTP_PM -> RasGTP_depal_cyt; (Ras_PM_depal1_Kf*RasGTP_PM + (-(Ras_PM_depal1_Kr*0.00166113*RasGTP_depal_cyt)))*PM;  // GO:0006886
    Ras_PM_depal1_I = 0 pA_um_2; Ras_PM_depal1_Kf = 0.0001 s_1; Ras_PM_depal1_Kr = 0 molecules_um_2_uM_1_s_1;

  // Unit definitions:
  unit substance = item;
  unit volume = (1e-6 metre)^3;
  unit area = (1e-6 metre)^2;
  unit molecules = item;
  unit umol_um3_litre_1 = 1e-21 mole;
  unit um2 = (1e-6 metre)^2;
  unit uM_um3_molecules_1 = 1e-21 dimensionless * mole / item;
  unit molecules_um_2_s_1 = 1e12 dimensionless * item / (metre^2 * second);
  unit pA_um_2 = dimensionless * ampere / metre^2;
  unit s_1 = 1 / second;
  unit s = second;
  unit molecules_um_2 = 1e12 dimensionless * item / metre^2;
  unit uM_s_1 = 1e-3 dimensionless * mole / (metre^3 * second);
  unit uM_1_s_1 = 1000 dimensionless * metre^3 / (mole * second);
  unit uM = 1e-3 dimensionless * mole / metre^3;
  unit molecules_um_2_uM_1_s_1 = 1e15 dimensionless * item * metre / (mole * second);
  unit um2_molecules_1_s_1 = 1e-12 dimensionless * metre^2 / (item * second);
  unit uM_um_s_1 = 1e-9 dimensionless * mole / (metre^2 * second);
  unit _one__0E_33_item_2_m2_mol_s_1 = 1e-33 dimensionless * metre^2 * mole / (item^2 * second);
  unit _one__0E_30_item_2_m5_s_1 = 1e-30 dimensionless * metre^5 / (item^2 * second);
  unit um3_molecules_1_s_1 = 1e-18 dimensionless * metre^3 / (item * second);
end
