// SBML level 3 version 1

model Zi2007_TGFbeta_signaling()
  // The model reproduces the time profiles of Total Smad2 in the nucleus as well as the cytoplasm as depicted in 2D and also the other time profiles as depicted in Fig 2. Two parameters that are not present in the paper are introduced here for illustration purposes and they are Total Smad2n and Total Smad2c. The term kr_EE*LRC_EE has not been included in the ODE's for T1R_surf, T2R_surf and TGFbeta in the paper but is included in this model. MathSBML was used to reproduce the simulation result.
  // To the extent possible under law, all copyright and related or neighbouring rights to this encoded model have been dedicated to the public domain worldwide. Please refer to CC0 Public Domain Dedication for more information.
  // In summary, you are entitled to use this encoded model in absolutely any manner you deem suitable, verbatim, or with modification, alone or embedded it in a larger context, redistribute it, commercially or not, in a restricted way or not.
  // To cite BioModels Database, please use: Li C, Donizelli M, Rodriguez N, Dharuri H, Endler L, Chelliah V, Li L, He E, Henry A, Stefan MI, Snoep JL, Hucka M, Le Novère N, Laibe C (2010) BioModels Database: An enhanced, curated and annotated resource for published quantitative kinetic models. BMC Syst Biol., 4:92.
  // biomodels.db:MODEL3388742457
  // biomodels.db:BIOMD0000000163
  // isDescribedBy pubmed:17895977
  // hasTaxon taxonomy:131567
  // isVersionOf GO:0017015
  // isPartOf kegg.pathway:hsa04350
  // model units - substance: substance, time: time, volume: volume, area: area, length: metre, extent: substance

  // Compartments:
  compartment V_medium = 1 volume; V_medium is "Medium";  // GO:0005576
  compartment V_nuc = 0.00035 volume; V_nuc is "Nucleus";  // GO:0005634
  compartment V_cyt = 0.00105 volume; V_cyt is "Cytoplasm";  // GO:0005737

  // Species:
  species Smad2c in V_cyt = 492.61;  // isVersionOf uniprot:Q15796
  species Smad2n in V_nuc = 236.45;  // isVersionOf uniprot:Q15796
  species Smad4c in V_cyt = 1149.4;  // isVersionOf uniprot:Q13485
  species Smad4n in V_nuc = 551.72;  // isVersionOf uniprot:Q13485
  species T1R_Surf in V_cyt = 0.237;  // isVersionOf uniprot:Q8NER5
  species T1R_Cave in V_cyt = 2.092;  // isVersionOf uniprot:Q8NER5
  species T1R_EE in V_cyt = 2.06;  // isVersionOf uniprot:Q8NER5
  species T2R_Surf in V_cyt = 0.202;  // isVersionOf uniprot:P37173
  species T2R_Cave in V_cyt = 1.778;  // isVersionOf uniprot:P37173
  species T2R_EE in V_cyt = 1.148;  // isVersionOf uniprot:P37173
  species LRC_Surf in V_cyt = 0;  // hasPart uniprot:P37173 uniprot:Q8NER5 uniprot:P01137
  species LRC_Cave in V_cyt = 0;  // hasPart uniprot:P37173 uniprot:Q8NER5 uniprot:P01137
  species LRC_EE in V_cyt = 0;  // hasPart uniprot:P37173 uniprot:Q8NER5 uniprot:P01137
  species Smads_Complex_c in V_cyt = 0;  // hasPart uniprot:Q13485 uniprot:Q15796
  species Smads_Complex_n in V_nuc = 0;  // hasPart uniprot:Q13485 uniprot:Q15796
  species TGF_beta in V_medium = 0.08;  // isVersionOf uniprot:P01137

  // Parameters:
  v_T1R = 0.0103;
  v_T2R = 0.02869;
  ki_EE = 0.33;
  kr_EE = 0.033;
  ki_Cave = 0.33;
  kr_Cave = 0.03742;
  Kcd = 0.005;
  k_LRC = 2197;
  Klid = 0.02609;
  Kdeg_T1R_EE = 0.005;
  Kdeg_T2R_EE = 0.025;
  Kimp_Smad2c = 0.16;
  Kexp_Smad2n = 1;
  Kimp_Smad4c = 0.08;
  Kexp_Smad4n = 0.5;
  k_Smads_Complex_c = 6.85e-5;
  Kimp_Smads_Complex_c = 0.16;
  Kdiss_Smads_Complex_n = 0.1174;

  // Assignment rules:
  Total_Smad2n := Smad2n + Smads_Complex_n;
  Total_Smad2c := Smad2c + Smads_Complex_c;

  // Reactions:
  R1_Smad2_import: Smad2c => Smad2n; V_cyt*Kimp_Smad2c*Smad2c;  // GO:0007184
  R2_Smad2_export: Smad2n => Smad2c; V_nuc*Kexp_Smad2n*Smad2n;  // isVersionOf GO:0006886
  R3_Smad4_import: Smad4c => Smad4n; V_cyt*Kimp_Smad4c*Smad4c;  // GO:0007184
  R4_Smad4_export: Smad4n => Smad4c; V_nuc*Kexp_Smad4n*Smad4n;  // isVersionOf GO:0006886
  R5_T1R_production: => T1R_Surf; V_cyt*v_T1R;  // isVersionOf GO:0032905
  R6_T1R_Cave_formation: T1R_Surf => T1R_Cave; V_cyt*ki_Cave*T1R_Surf;  // isVersionOf GO:0002090
  R7_T1R_Cave_recycling: T1R_Cave => T1R_Surf; V_cyt*kr_Cave*T1R_Cave;  // isVersionOf GO:0002090
  R8_T1R_EE_formation: T1R_Surf => T1R_EE; V_cyt*ki_EE*T1R_Surf;  // isVersionOf GO:0002090
  R9_T1R_EE_recycling: T1R_EE => T1R_Surf; V_cyt*kr_EE*T1R_EE;  // isVersionOf GO:0002090
  R10_T1R_EE_degradation: T1R_EE => ; V_cyt*Kdeg_T1R_EE*T1R_EE;  // isVersionOf GO:0031623
  R11_T2R_production: => T2R_Surf; V_cyt*v_T2R;  // isVersionOf GO:0032906
  R12_T2R_Cave_formation: T2R_Surf => T2R_Cave; V_cyt*ki_Cave*T2R_Surf;  // isVersionOf GO:0002090
  R13_T2R_Cave_recycling: T2R_Cave => T2R_Surf; V_cyt*kr_Cave*T2R_Cave;  // isVersionOf GO:0002090
  R14_T2R_EE_formation: T2R_Surf => T2R_EE; V_cyt*ki_EE*T2R_Surf;  // isVersionOf GO:0031623
  R15_T2R_EE_recycling: T2R_EE => T2R_Surf + TGF_beta; V_cyt*kr_EE*T2R_EE;  // isVersionOf GO:0002090
  R16_T2R_EE_degradation: T2R_EE => ; V_cyt*Kdeg_T2R_EE*T2R_EE;  // isVersionOf GO:0031623
  R17_LRC_formation: TGF_beta + T2R_Surf + T1R_Surf => LRC_Surf; V_cyt*k_LRC*TGF_beta*T2R_Surf*T1R_Surf;  // isVersionOf GO:0005160
  R18_LRC_Cave_formation: LRC_Surf => LRC_Cave; V_cyt*ki_Cave*LRC_Surf;  // isVersionOf GO:0017015
  R19_LRC_Cave_recycling: LRC_Cave => T1R_Surf + TGF_beta + T2R_Surf; V_cyt*kr_Cave*LRC_Cave;  // isVersionOf GO:0017015
  R20_LRC_EE_formation: LRC_Surf => LRC_EE; V_cyt*ki_EE*LRC_Surf;  // isVersionOf GO:0017015
  R21_LRC_EE_recycling: LRC_EE => T1R_Surf + T2R_Surf + TGF_beta; V_cyt*kr_EE*LRC_EE;  // isVersionOf GO:0017015
  R22_LRC_EE_degradation: LRC_EE => ; V_cyt*Kcd*LRC_EE;  // isVersionOf GO:0017015
  R23_Smads_Complex_formation: Smad2c + Smad4c => Smads_Complex_c; V_cyt*k_Smads_Complex_c*Smad2c*Smad4c*LRC_EE;  // modifiers: LRC_EE; GO:0007184
  R24_Smads_Complex_import: Smads_Complex_c => Smads_Complex_n; V_cyt*Kimp_Smads_Complex_c*Smads_Complex_c;  // isVersionOf GO:0007184
  R25_Smads_Complex_Dissociation: Smads_Complex_n => Smad4n + Smad2n; V_nuc*Kdiss_Smads_Complex_n*Smads_Complex_n;
  R26_LRC_Cave_degradation: LRC_Cave => ; V_cyt*Klid*LRC_Cave*Smads_Complex_n;  // modifiers: Smads_Complex_n; isVersionOf GO:0030163

  // Unit definitions:
  unit time = 60 second; time is "minute";
  unit substance = 1e-9 mole; substance is "nano mole";
  unit volume = litre;
  unit area = metre^2;
end
