// SBML level 3 version 1

model Saucerman2006_PKA()
  // The model reproduces Fig 2B of the paper. Model successfully tested on MathSBML
  // To the extent possible under law, all copyright and related or neighbouring rights to this encoded model have been dedicated to the public domain worldwide. Please refer to CC0 Public Domain Dedication for more information.
  // In summary, you are entitled to use this encoded model in absolutely any manner you deem suitable, verbatim, or with modification, alone or embedded it in a larger context, redistribute it, commercially or not, in a restricted way or not.
  // To cite BioModels Database, please use: Li C, Donizelli M, Rodriguez N, Dharuri H, Endler L, Chelliah V, Li L, He E, Henry A, Stefan MI, Snoep JL, Hucka M, Le Novère N, Laibe C (2010) BioModels Database: An enhanced, curated and annotated resource for published quantitative kinetic models. BMC Syst Biol., 4:92.
  // biomodels.db:MODEL8003201958
  // biomodels.db:BIOMD0000000165
  // isDescribedBy pubmed:16905651
  // isDerivedFrom biomodels.db:MODEL1006230118
  // hasTaxon taxonomy:10116
  // isVersionOf GO:0007188 GO:0034199
  // model units - substance: substance, time: second, volume: volume, area: area, length: metre, extent: substance

  // Compartments:
  compartment ec = 1 litre;  // GO:0005576
  compartment cell = 0.25 litre;  // GO:0005623
  compartment membrane = 0.25 um2;  // 2-D; GO:0016020

  // Species:
  species Gsbg_cell in cell = 0;  // GO:0031680
  species L_cell in cell = 0;
  species Gsa_gdp_cell in cell = 0;  // hasPart CHEBI:17552 interpro:IPR001019; hasPart interpro:IPR001019 kegg.compound:C00035
  species Gsa_gtp_cell in cell = 0;  // hasPart CHEBI:15996 interpro:IPR001019; hasPart interpro:IPR001019 kegg.compound:C00044
  species b1AR_S464_cell in cell = 0;  // hasPart uniprot:Q5T5Y4
  species PDEcAMP_cell in cell = 0;
  species PDE_cell in cell = 0.014;  // isVersionOf uniprot:P54750
  species $ATP_cell in cell = 5000;  // CHEBI:15422 kegg.compound:C00002
  species b1AR_cell in cell = 0.0132;  // isVersionOf uniprot:Q5T5Y4
  species Gs_cell in cell = 3.83;  // isVersionOf uniprot:P63092
  species A2RC_cell in cell = 0;
  species A2R_cell in cell = 0;
  species PKAC_cell in cell = 0;
  species ARC_cell in cell = 0;
  species PKAC_AKAR_cell in cell = 0;  // hasPart uniprot:P17612
  species Propranolol_cell in cell = 0;
  species b1ARinhib_cell in cell = 0;
  species light_spot_cell in cell = 0;
  species AC_cell in cell = 0.0497;  // isVersionOf uniprot:Q08828
  species PKI_cell in cell = 0.18;
  species PKAC_PKI_cell in cell = 0;
  species RC_cell in cell = 1.18;
  species b1AR_Gs_cell in cell = 0;  // hasPart uniprot:P63092 uniprot:Q5T5Y4
  species cAMP_cell in cell = 0;  // CHEBI:17489 kegg.compound:C00575
  species GsAC_cell in cell = 0;  // hasPart uniprot:Q08828 uniprot:P63092
  species IBMX_cell in cell = 0;
  species PDE_IBMX_cell in cell = 0;
  species Fsk_cell in cell = 0;
  species FskAC_cell in cell = 0;
  species b1AR_p_cell in cell = 0;  // isVersionOf uniprot:Q5T5Y4
  species L_b1AR_cell in cell = 0;  // hasPart uniprot:Q5T5Y4
  species AKAR_cell in cell = 10;
  species AKARp_cell in cell = 0;
  species PP_cell in cell = 0.67;
  species PP_AKARp_cell in cell = 0;
  species DMNB_cAMP_cell in cell = 3.01;  // CHEBI:17489 kegg.compound:C00575
  species L_b1AR_Gs_cell in cell = 0;  // hasPart uniprot:P63092 uniprot:Q5T5Y4

  // Parameters:
  k_ac_gsa_cAMP_synthesis_GsAC = 2.5 s_1;
  Vmax_cAMP_synthesis_GsAC has uM_s_1;
  ton_global_light_cAMP_photolysis = 2160 s;
  toff_global_light_cAMP_photolysis = 2165 s;
  ton_local_light_cAMP_photolysis = 0 s;
  toff_local_light_cAMP_photolysis = 0 s;
  light_cAMP_photolysis has uM;
  kfsk_cAMP_synthesis_FskAC = 7.3 s_1;
  Vmax_cAMP_synthesis_FskAC has uM_s_1;
  Kf_inhibit_PDE has uM_1_s_1;
  Kr_inhibit_PDE has s_1;
  t_propadd = 2420;
  Propranolol_pipette = 1;
  tauPropranolol = 1;
  t_Ladd = 2160;
  L_pipette = 0.1;
  tauL = 1;

  // Assignment rules:
  Vmax_cAMP_synthesis_GsAC := k_ac_gsa_cAMP_synthesis_GsAC*GsAC_cell;
  light_cAMP_photolysis := piecewise(1, (time > ton_global_light_cAMP_photolysis) && (time < toff_global_light_cAMP_photolysis), 0) + piecewise(light_spot_cell, (time > ton_local_light_cAMP_photolysis) && (time < toff_local_light_cAMP_photolysis), 0);
  Vmax_cAMP_synthesis_FskAC := kfsk_cAMP_synthesis_FskAC*FskAC_cell;
  Kf_inhibit_PDE := piecewise(1000, time > 1000, 0);
  Kr_inhibit_PDE := piecewise(30000, time > 1000, 0);
  ar_for_add_propranolol := piecewise((Propranolol_pipette + (-Propranolol_cell))*(1/tauPropranolol), time > t_propadd, 0);
  ar_for_add_Ligand := piecewise((L_pipette + (-L_cell))*(1/tauL), time > t_Ladd, 0);
  Ratio_AKARp_AKARtot := AKARp_cell/(AKAR_cell + AKARp_cell + PKAC_AKAR_cell + PP_AKARp_cell);

  // Reactions:
  cAMP_synthesis_GsAC: $ATP_cell -> cAMP_cell; Vmax_cAMP_synthesis_GsAC*ATP_cell*(1/(cAMP_synthesis_GsAC_Km + ATP_cell))*cell;  // modifiers: GsAC_cell; isVersionOf GO:0006171
    cAMP_synthesis_GsAC_Km = 315 uM;
  bind_b1AR_propranolol: Propranolol_cell + b1AR_cell -> b1ARinhib_cell; (bind_b1AR_propranolol_Kf*Propranolol_cell*b1AR_cell + (-(bind_b1AR_propranolol_Kr*b1ARinhib_cell)))*cell;  // isVersionOf GO:0031690
    bind_b1AR_propranolol_Kf = 1000 uM_1_s_1; bind_b1AR_propranolol_Kr = 8 s_1;
  add_propranolol: -> Propranolol_cell; ar_for_add_propranolol*cell;
  cAMP_photolysis: DMNB_cAMP_cell -> cAMP_cell; kphot*light_cAMP_photolysis*DMNB_cAMP_cell*cell;  // modifiers: light_spot_cell
    kphot = 0.1 uM_1_s_1;
  LRG_activation: L_b1AR_Gs_cell -> Gsa_gtp_cell + Gsbg_cell + L_b1AR_cell; LRG_activation_k_gact*L_b1AR_Gs_cell*cell;  // isVersionOf GO:0004939
    LRG_activation_k_gact = 16 s_1;
  bind_Lb1AR_Gs: Gs_cell + L_b1AR_cell -> L_b1AR_Gs_cell; (bind_Lb1AR_Gs_Kf*Gs_cell*L_b1AR_cell + (-(bind_Lb1AR_Gs_Kr*L_b1AR_Gs_cell)))*cell;  // isVersionOf GO:0004939
    bind_Lb1AR_Gs_Kf = 1000 uM_1_s_1; bind_Lb1AR_Gs_Kr = 62 s_1;
  desens_bark: L_b1AR_cell -> b1AR_S464_cell; k_barkp*(L_b1AR_cell + L_b1AR_Gs_cell)*cell;  // modifiers: L_b1AR_Gs_cell
    k_barkp = 0.0011 s_1;
  bind_cAMP_ARC: ARC_cell + cAMP_cell -> A2RC_cell; (bind_cAMP_ARC_Kf*ARC_cell*cAMP_cell + (-(bind_cAMP_ARC_Kr*A2RC_cell)))*cell;  // isVersionOf GO:0030552
    bind_cAMP_ARC_Kf = 1000 uM_1_s_1; bind_cAMP_ARC_Kr = 1640 s_1;
  bind_b1AR_Gs: b1AR_cell + Gs_cell -> b1AR_Gs_cell; (bind_b1AR_Gs_Kf*b1AR_cell*Gs_cell + (-(bind_b1AR_Gs_Kr*b1AR_Gs_cell)))*cell;  // isVersionOf GO:0004939
    bind_b1AR_Gs_Kf = 1000 uM_1_s_1; bind_b1AR_Gs_Kr = 33000 s_1;
  bind_PDEcAMP: PDE_cell + cAMP_cell -> PDEcAMP_cell; (bind_PDEcAMP_Kf*PDE_cell*cAMP_cell + (-(bind_PDEcAMP_Kr*PDEcAMP_cell)))*cell;  // isVersionOf GO:0030552
    bind_PDEcAMP_Kf = 1000 uM_1_s_1; bind_PDEcAMP_Kr = 1300 s_1;
  Gs_gtp_hydrolysis: Gsa_gtp_cell -> Gsa_gdp_cell; khyd*Gsa_gtp_cell*cell;  // isVersionOf GO:0003924
    khyd = 0.8 s_1;
  Gs_reassociation: Gsbg_cell + Gsa_gdp_cell -> Gs_cell; k_reassoc*Gsa_gdp_cell*Gsbg_cell*cell;  // isPartOf GO:0031684
    k_reassoc = 1210 uM_1_s_1;
  bind_FskAC: AC_cell + Fsk_cell -> FskAC_cell; (bind_FskAC_Kf*AC_cell*Fsk_cell + (-(bind_FskAC_Kr*FskAC_cell)))*cell;
    bind_FskAC_Kf = 1000 uM_1_s_1; bind_FskAC_Kr = 860000 s_1;
  bind_AKARp_PP: PP_cell + AKARp_cell -> PP_AKARp_cell; (bind_AKARp_PP_Kf*PP_cell*AKARp_cell + (-(bind_AKARp_PP_Kr*PP_AKARp_cell)))*cell;
    bind_AKARp_PP_Kf = 1000 uM_1_s_1; bind_AKARp_PP_Kr = 7000 s_1;
  desens_pka: b1AR_cell -> b1AR_p_cell; (kpkap*PKAC_cell*(L_b1AR_Gs_cell + b1AR_cell + L_b1AR_cell) + (-(kpkam*b1AR_p_cell)))*cell;  // modifiers: PKAC_cell, L_b1AR_Gs_cell, L_b1AR_cell
    kpkap = 0.0036 uM_1_s_1; kpkam = 0.0022 s_1;
  bind_L_b1ARGs: b1AR_Gs_cell + L_cell -> L_b1AR_Gs_cell; (bind_L_b1ARGs_Kf*b1AR_Gs_cell*L_cell + (-(Kd*L_b1AR_Gs_cell)))*cell;  // isVersionOf GO:0004939
    bind_L_b1ARGs_Kf = 1000 uM_1_s_1; Kd = 0.535714 s_1;
  bind_L_b1AR: L_cell + b1AR_cell -> L_b1AR_cell; (bind_L_b1AR_Kf*L_cell*b1AR_cell + (-(bind_L_b1AR_Kr*L_b1AR_cell)))*cell;  // isVersionOf GO:0031690
    bind_L_b1AR_Kf = 1000 uM_1_s_1; bind_L_b1AR_Kr = 285 s_1;
  bind_A2R_PKAC: A2RC_cell -> A2R_cell + PKAC_cell; (bind_A2R_PKAC_Kf*A2RC_cell + (-(bind_A2R_PKAC_Kr*A2R_cell*PKAC_cell)))*cell;
    bind_A2R_PKAC_Kf = 4375 s_1; bind_A2R_PKAC_Kr = 1000 uM_1_s_1;
  inhib_PKAC: PKAC_cell + PKI_cell -> PKAC_PKI_cell; (inhib_PKAC_Kf*PKAC_cell*PKI_cell + (-(inhib_PKAC_Kr*PKAC_PKI_cell)))*cell;  // isVersionOf GO:0004862
    inhib_PKAC_Kf = 1000 uM_1_s_1; inhib_PKAC_Kr = 0.2 s_1;
  bind_RC_cAMP: RC_cell + cAMP_cell -> ARC_cell; (bind_RC_cAMP_Kf*RC_cell*cAMP_cell + (-(bind_RC_cAMP_Kr*ARC_cell)))*cell;  // isVersionOf GO:0030552
    bind_RC_cAMP_Kf = 1000 uM_1_s_1; bind_RC_cAMP_Kr = 9140 s_1;
  cAMP_synthesis_FskAC: $ATP_cell -> cAMP_cell; Vmax_cAMP_synthesis_FskAC*ATP_cell*(1/(cAMP_synthesis_FskAC_Km + ATP_cell))*cell;  // modifiers: FskAC_cell; isVersionOf GO:0006171
    cAMP_synthesis_FskAC_Km = 860 uM;
  add_Ligand: -> L_cell; ar_for_add_Ligand*cell;
  bind_Gs_AC: Gsa_gtp_cell + AC_cell -> GsAC_cell; (bind_Gs_AC_Kf*Gsa_gtp_cell*AC_cell + (-(bind_Gs_AC_Kr*GsAC_cell)))*cell;  // isVersionOf GO:0008179
    bind_Gs_AC_Kf = 1000 uM_1_s_1; bind_Gs_AC_Kr = 400 s_1;
  resens_bark: b1AR_S464_cell -> L_b1AR_cell; k_barkm*b1AR_S464_cell*cell;
    k_barkm = 0.0022 s_1;
  bind_PKAC_AKAR: AKAR_cell + PKAC_cell -> PKAC_AKAR_cell; (bind_PKAC_AKAR_Kf*AKAR_cell*PKAC_cell + (-(bind_PKAC_AKAR_Kr*PKAC_AKAR_cell)))*cell;
    bind_PKAC_AKAR_Kf = 1000 uM_1_s_1; bind_PKAC_AKAR_Kr = 21000 s_1;
  inhibit_PDE: PDE_cell + IBMX_cell -> PDE_IBMX_cell; (Kf_inhibit_PDE*PDE_cell*IBMX_cell + (-(Kr_inhibit_PDE*PDE_IBMX_cell)))*cell;
  AKARp_dephosph: PP_AKARp_cell -> PP_cell + AKAR_cell; kcat_PP_AKARp*PP_AKARp_cell*cell;
    kcat_PP_AKARp = 8.5 s_1;
  AKAR_phosph: PKAC_AKAR_cell -> AKARp_cell + PKAC_cell; kpka_akar*PKAC_AKAR_cell*cell;
    kpka_akar = 54 s_1;
  RG_activation: b1AR_Gs_cell -> Gsa_gtp_cell + Gsbg_cell + b1AR_cell; RG_activation_k_gact*b1AR_Gs_cell*cell;  // isVersionOf GO:0004939
    RG_activation_k_gact = 16 s_1;
  cAMP_degradation: PDEcAMP_cell -> PDE_cell; kpde*PDEcAMP_cell*cell;  // isVersionOf GO:0006198
    kpde = 5 s_1;

  // Unit definitions:
  unit substance = 1e-6 mole;
  unit volume = litre;
  unit area = (1e-6 metre)^2;
  unit molecules = item;
  unit umol_litre_um_3 = 1e-21 mole;
  unit um2 = (1e-6 metre)^2;
  unit uM_s_1 = 1e-3 dimensionless * mole / (metre^3 * second);
  unit uM = 1e-3 dimensionless * mole / metre^3;
  unit s_1 = 1 / second;
  unit uM_1_s_1 = 1000 dimensionless * metre^3 / (mole * second);
  unit s = second;
end
