// SBML level 3 version 1

model MODEL8609366518()
  // Neves2008 - Role of cell shape and size in controlling intracellular signalling
  // The role of cell shape and size in the flow of spatial information from the cell surface receptor to downstream components within the cell has been studied on the β-adrenergic receptor to MAPK-signalling network.
  // This model is described in the article:
  // Cell shape and negative links in regulatory motifs together control spatial information flow in signaling networks.
  // Neves SR, Tsokas P, Sarkar A, Grace EA, Rangamani P, Taubenfeld SM, Alberini CM, Schaff JC, Blitzer RD, Moraru II, Iyengar R
  // Cell. 2008, 133(4):666-680
  // Abstract:
  // The role of cell size and shape in controlling local intracellular signaling reactions, and how this spatial information originates and is propagated, is not well understood. We have used partial differential equations to model the flow of spatial information from the beta-adrenergic receptor to MAPK1,2 through the cAMP/PKA/B-Raf/MAPK1,2 network in neurons using real geometries. The numerical simulations indicated that cell shape controls the dynamics of local biochemical activity of signal-modulated negative regulators, such as phosphodiesterases and protein phosphatases within regulatory loops to determine the size of microdomains of activated signaling components. The model prediction that negative regulators control the flow of spatial information to downstream components was verified experimentally in rat hippocampal slices. These results suggest a mechanism by which cellular geometry, the presence of regulatory loops with negative regulators, and key reaction rates all together control spatial information transfer and microdomain characteristics within cells.
  // This model is hosted on BioModels Database and identified by: MODEL8609366518 .
  // To cite BioModels Database, please use: BioModels Database: An enhanced, curated and annotated resource for published quantitative kinetic models .
  // To the extent possible under law, all copyright and related or neighbouring rights to this encoded model have been dedicated to the public domain worldwide. Please refer to CC0 Public Domain Dedication for more information.
  // biomodels.db:MODEL8609366518
  // biomodels.db:BIOMD0000000182
  // isDescribedBy pubmed:18485874
  // isPartOf kegg.pathway:rno04010
  // hasPart GO:0000165 GO:0007190
  // hasTaxon taxonomy:10116
  // model units - substance: substance, time: second, volume: volume, area: area, length: metre, extent: substance

  // Compartments:
  compartment cyto = 1 volume;  // GO:0005737
  compartment extra = 0.1111111 volume;  // GO:0005576
  compartment cyto_mem = 0.2 um2;  // 2-D; GO:0005886

  // Species:
  species AC_active_cyto_mem in cyto_mem = 0;  // substance in molecules; isVersionOf uniprot:P26769; hasPart interpro:IPR001054
  species G_GDP_cyto in cyto = 0;  // substance in molecules; hasPart CHEBI:17552 interpro:IPR001019 kegg.compound:C00035
  species G_protein_cyto in cyto = 2167.2;  // substance in molecules; GO:0005834
  species G_a_s_cyto in cyto = 0;  // substance in molecules; isVersionOf uniprot:Q8CGK7
  species GRK_bg_cyto in cyto = 0;  // substance in molecules
  species iso_BAR_p_cyto_mem in cyto_mem = 0;  // substance in molecules; hasPart uniprot:P18090
  species PDE4_cyto in cyto = 240.8;  // substance in molecules; isVersionOf uniprot:P54748 interpro:IPR003607
  species ATP_cyto in cyto = 3010000;  // substance in molecules; CHEBI:15422 kegg.compound:C00002
  species AC_PKA_cyto_mem in cyto_mem = 0;  // substance in molecules; hasPart uniprot:A1L1M0 uniprot:P26769 interpro:IPR001054
  species R2C2_cyto in cyto = 120.4;  // substance in molecules; isVersionOf GO:0005952
  species PP_PDE_cyto in cyto = 120.4;  // substance in molecules; isVersionOf uniprot:P54748 interpro:IPR003607
  species BAR_cyto_mem in cyto_mem = 94;  // substance in molecules; isVersionOf uniprot:P18090
  species BAR_G_cyto_mem in cyto_mem = 0;  // substance in molecules; isVersionOf uniprot:P18090
  species iso_extra in extra = 6020;  // substance in molecules
  species iso_BAR_cyto_mem in cyto_mem = 0;  // substance in molecules; hasPart uniprot:P18090
  species MAPK_active_cyto in cyto = 0;  // substance in molecules; isVersionOf uniprot:P63086
  species MEK_cyto in cyto = 108.36;  // substance in molecules; isVersionOf uniprot:Q01986
  species MEK_active_cyto in cyto = 0;  // substance in molecules; isVersionOf uniprot:Q01986
  species B_Raf_active_cyto in cyto = 0;  // substance in molecules; isVersionOf uniprot:Q99MC6
  species bg_cyto in cyto = 0;  // substance in molecules
  species B_Raf_cyto in cyto = 120.4;  // substance in molecules; isVersionOf uniprot:Q99MC6
  species PKA_cyto in cyto = 0;  // substance in molecules; isVersionOf uniprot:A1L1M0
  species AC_cyto_mem in cyto_mem = 300;  // substance in molecules; isVersionOf uniprot:P26769; hasPart interpro:IPR001054
  species AMP_cyto in cyto = 3010000;  // substance in molecules; CHEBI:16027 kegg.compound:C00020
  species GRK_cyto in cyto = 0.602;  // substance in molecules
  species PP2A_cyto in cyto = 60.2;  // substance in molecules; isVersionOf uniprot:Q64623
  species MAPK_cyto in cyto = 216.72;  // substance in molecules; isVersionOf uniprot:P63086
  species PTP_cyto in cyto = 120.4;  // substance in molecules; isVersionOf uniprot:P49445
  species PTP_PKA_cyto in cyto = 0;  // substance in molecules; hasPart uniprot:P49445 uniprot:A1L1M0
  species c_R2C2_cyto in cyto = 0;  // substance in molecules; isVersionOf GO:0005952
  species c2_R2C2_cyto in cyto = 0;  // substance in molecules; isVersionOf GO:0005952
  species c3_R2C2_cyto in cyto = 0;  // substance in molecules; isVersionOf GO:0005952
  species iso_BAR_G_cyto_mem in cyto_mem = 0;  // substance in molecules; hasPart uniprot:P18090 GO:0005834
  species PDE_high_km_cyto in cyto = 301;  // substance in molecules
  species cAMP_cyto in cyto = 0;  // substance in molecules; CHEBI:17489 kegg.compound:C00575
  species PTP_PP_cyto in cyto = 60.2;  // substance in molecules; hasPart uniprot:P49445
  species PDE4_P_cyto in cyto = 0;  // substance in molecules; isVersionOf uniprot:P54748 interpro:IPR003607

  // Parameters:
  KMOLE = 0.00166113 uM_um3_molecules_1;
  Vmax_pde4_p_pde4_p has uM_s_1;
  kcat_PPase_Raf = 5 s_1;
  Vmax_PPase_Raf has uM_s_1;
  Vmax_PDE4_PDE4 has uM_s_1;
  Vmax_MEK_activates_MAPK has uM_s_1;
  kcat_PKA_activates_Raf = 10 s_1;
  Vmax_PKA_activates_Raf has uM_s_1;
  Vmax_AC_active_AC_active has molecules_um_2_s_1;
  Vmax_highKM_PDE has uM_s_1;
  kcat_PKA_P_PTP = 0.2 s_1;
  Vmax_PKA_P_PTP has uM_s_1;
  Vmax_AC_basal_AC_basal has molecules_um_2_s_1;
  Vmax_grk_GRK has molecules_um_2_s_1;
  Vmax_PKA_P_PDE has uM_s_1;
  Vmax_Raf_activates_MEK has uM_s_1;
  kcat_PTP_PKA = 0.1 s_1;
  Vmax_PTP_PKA has uM_s_1;
  kcat_PTP = 1.06 s_1;
  Vmax_PTP has uM_s_1;
  kcat_PPase_MAPK = 0.636 s_1;
  Vmax_PPase_MAPK has uM_s_1;
  Vmax_pp2a_4_pp2a_4 has uM_s_1;
  kcat_pp_ptp_pp_ptp = 5 s_1;
  Vmax_pp_ptp has uM_s_1;
  Vmax_GRK_bg_GRK_bg has molecules_um_2_s_1;
  kcat_PPase_mek = 5 s_1;
  Vmax_PPase_mek has uM_s_1;

  // Assignment rules:
  Vmax_pde4_p_pde4_p := 20*0.00166113*PDE4_P_cyto;
  Vmax_PPase_Raf := kcat_PPase_Raf*0.00166113*PP2A_cyto;
  Vmax_PDE4_PDE4 := 8*0.00166113*PDE4_cyto;
  Vmax_MEK_activates_MAPK := 0.15*0.00166113*MEK_active_cyto;
  Vmax_PKA_activates_Raf := kcat_PKA_activates_Raf*0.00166113*PKA_cyto;
  Vmax_AC_active_AC_active := 8.5*AC_active_cyto_mem;
  Vmax_highKM_PDE := 8*0.00166113*PDE_high_km_cyto;
  Vmax_PKA_P_PTP := kcat_PKA_P_PTP*0.00166113*PKA_cyto;
  Vmax_AC_basal_AC_basal := 0.2*AC_cyto_mem;
  Vmax_grk_GRK := 0.104*0.00166113*GRK_cyto;
  Vmax_PKA_P_PDE := 10*0.00166113*PKA_cyto;
  Vmax_Raf_activates_MEK := 0.105*0.00166113*B_Raf_active_cyto;
  Vmax_PTP_PKA := kcat_PTP_PKA*0.00166113*PTP_PKA_cyto;
  Vmax_PTP := kcat_PTP*0.00166113*PTP_cyto;
  Vmax_PPase_MAPK := kcat_PPase_MAPK*0.00166113*PP2A_cyto;
  Vmax_pp2a_4_pp2a_4 := 5*0.00166113*PP_PDE_cyto;
  Vmax_pp_ptp := kcat_pp_ptp_pp_ptp*0.00166113*PTP_PP_cyto;
  Vmax_GRK_bg_GRK_bg := 1.34*0.00166113*GRK_bg_cyto;
  Vmax_PPase_mek := kcat_PPase_mek*0.00166113*PP2A_cyto;

  // Reactions:
  activate_Gs: iso_BAR_G_cyto_mem -> iso_BAR_cyto_mem + bg_cyto + G_a_s_cyto; (Kf_activate_Gs*iso_BAR_G_cyto_mem - Kr_activate_Gs*iso_BAR_cyto_mem*0.00166113*bg_cyto*0.00166113*G_a_s_cyto)*cyto_mem;  // isVersionOf GO:0004930
    activate_Gs_I = 0 pA_um_2; Kf_activate_Gs = 0.025 s_1; Kr_activate_Gs = 0 _one_000000_0_m6_mol_2_s_1;
  pde4_p: cAMP_cyto -> AMP_cyto; Vmax_pde4_p_pde4_p*0.00166113*cAMP_cyto*(1/(Km_pde4_p + 0.00166113*cAMP_cyto))*cyto*1*(1/KMOLE);  // modifiers: PDE4_P_cyto; isVersionOf ec-code:3.1.4.17 GO:0004115
    Km_pde4_p = 1.3 uM;
  PPase_Raf: B_Raf_active_cyto -> B_Raf_cyto; Vmax_PPase_Raf*0.00166113*B_Raf_active_cyto*(1/(PPase_Raf_Km + 0.00166113*B_Raf_active_cyto))*cyto*1*(1/KMOLE);  // modifiers: PP2A_cyto; isVersionOf ec-code:3.1.3.16 GO:0004721
    PPase_Raf_Km = 15.7 uM;
  iso_binds_BAR: BAR_cyto_mem + iso_extra -> iso_BAR_cyto_mem; (iso_binds_BAR_Kf*BAR_cyto_mem*0.00166113*iso_extra + (-(iso_binds_BAR_Kr*iso_BAR_cyto_mem)))*cyto_mem;  // isVersionOf GO:0031697
    iso_binds_BAR_I = 0 pA_um_2; iso_binds_BAR_Kf = 1 uM_1_s_1; iso_binds_BAR_Kr = 0.2 s_1;
  PDE4: cAMP_cyto -> AMP_cyto; Vmax_PDE4_PDE4*0.00166113*cAMP_cyto*(1/(Km_PDE4 + 0.00166113*cAMP_cyto))*cyto*1*(1/KMOLE);  // modifiers: PDE4_cyto; isVersionOf ec-code:3.1.4.17 GO:0004115
    Km_PDE4 = 1.3 uM;
  bg_binds_GRK: GRK_cyto + bg_cyto -> GRK_bg_cyto; (Kf_bg_binds_GRK*0.00166113*GRK_cyto*0.00166113*bg_cyto + (-(Kr_bg_binds_GRK*0.00166113*GRK_bg_cyto)))*cyto*1*(1/KMOLE);  // isVersionOf GO:0005515
    Kf_bg_binds_GRK = 1 uM_1_s_1; Kr_bg_binds_GRK = 0.25 s_1;
  MEK_activates_MAPK: MAPK_cyto -> MAPK_active_cyto; Vmax_MEK_activates_MAPK*0.00166113*MAPK_cyto*(1/(MEK_activates_MAPK_Km + 0.00166113*MAPK_cyto))*cyto*1*(1/KMOLE);  // modifiers: MEK_active_cyto; isVersionOf ec-code:2.7.12.2 GO:0004709
    MEK_activates_MAPK_Km = 0.046296 uM;
  PKA_activates_Raf: B_Raf_cyto -> B_Raf_active_cyto; Vmax_PKA_activates_Raf*0.00166113*B_Raf_cyto*(1/(PKA_activates_Raf_Km + 0.00166113*B_Raf_cyto))*cyto*1*(1/KMOLE);  // modifiers: PKA_cyto; isVersionOf ec-code:2.7.11.11 GO:0004674
    PKA_activates_Raf_Km = 0.5 uM;
  AC_active: ATP_cyto -> cAMP_cyto; Vmax_AC_active_AC_active*0.00166113*ATP_cyto*(1/(Km_AC_active + 0.00166113*ATP_cyto))*cyto_mem;  // modifiers: AC_active_cyto_mem; isVersionOf ec-code:4.6.1.1 GO:0006171
    AC_active_I = 0 pA_um_2; Km_AC_active = 32 uM;
  GTPase: G_a_s_cyto -> G_GDP_cyto; (Kf_GTPase*0.00166113*G_a_s_cyto + (-(Kr_GTPase*0.00166113*G_GDP_cyto)))*cyto*1*(1/KMOLE);  // isVersionOf GO:0003924
    Kf_GTPase = 0.06667 s_1; Kr_GTPase = 0 s_1;
  trimer: bg_cyto + G_GDP_cyto -> G_protein_cyto; (Kf_trimer*0.00166113*bg_cyto*0.00166113*G_GDP_cyto + (-(Kr_trimer*0.00166113*G_protein_cyto)))*cyto*1*(1/KMOLE);  // isPartOf GO:0031684
    Kf_trimer = 6 uM_1_s_1; Kr_trimer = 0 s_1;
  G_binds_iso_BAR: iso_BAR_cyto_mem + G_protein_cyto -> iso_BAR_G_cyto_mem; (Kf_G_binds_iso_BAR*iso_BAR_cyto_mem*0.00166113*G_protein_cyto + (-(Kr_G_binds_iso_BAR*iso_BAR_G_cyto_mem)))*cyto_mem;  // isVersionOf GO:0032795
    G_binds_iso_BAR_I = 0 pA_um_2; Kf_G_binds_iso_BAR = 10 uM_1_s_1; Kr_G_binds_iso_BAR = 0.1 s_1;
  A2: c3_R2C2_cyto + cAMP_cyto -> PKA_cyto; (A2_Kf*0.00166113*c3_R2C2_cyto*0.00166113*cAMP_cyto + (-(A2_Kr*0.00166113*PKA_cyto)))*cyto*1*(1/KMOLE);  // isVersionOf GO:0034199 GO:0030552
    A2_Kf = 8.35 uM_1_s_1; A2_Kr = 0.0167 s_1;
  highKM_PDE: cAMP_cyto -> AMP_cyto; Vmax_highKM_PDE*0.00166113*cAMP_cyto*(1/(highKM_PDE_Km + 0.00166113*cAMP_cyto))*cyto*1*(1/KMOLE);  // modifiers: PDE_high_km_cyto; isVersionOf ec-code:3.1.4.17 GO:0004115
    highKM_PDE_Km = 15 uM;
  PKA_P_PTP: PTP_cyto -> PTP_PKA_cyto; Vmax_PKA_P_PTP*0.00166113*PTP_cyto*(1/(PKA_P_PTP_Km + 0.00166113*PTP_cyto))*cyto*1*(1/KMOLE);  // modifiers: PKA_cyto; isVersionOf ec-code:2.7.11.11 GO:0004674
    PKA_P_PTP_Km = 0.1 uM;
  AC_activation: G_a_s_cyto + AC_cyto_mem -> AC_active_cyto_mem; (Kf_AC_activation*0.00166113*G_a_s_cyto*AC_cyto_mem + (-(Kr_AC_activation*AC_active_cyto_mem)))*cyto_mem;  // isVersionOf GO:0007190
    AC_activation_I = 0 pA_um_2; Kf_AC_activation = 500 uM_1_s_1; Kr_AC_activation = 1 s_1;
  AC_basal: ATP_cyto -> cAMP_cyto; Vmax_AC_basal_AC_basal*0.00166113*ATP_cyto*(1/(Km_AC_basal + 0.00166113*ATP_cyto))*cyto_mem;  // modifiers: AC_cyto_mem; isVersionOf GO:0007190
    AC_basal_I = 0 pA_um_2; Km_AC_basal = 1030 uM;
  B1: R2C2_cyto + cAMP_cyto -> c_R2C2_cyto; (B1_Kf*0.00166113*R2C2_cyto*0.00166113*cAMP_cyto + (-(B1_Kr*0.00166113*c_R2C2_cyto)))*cyto*1*(1/KMOLE);  // isVersionOf GO:0034199 GO:0030552
    B1_Kf = 0.0059 uM_1_s_1; B1_Kr = 0.00028 s_1;
  GRK: iso_BAR_cyto_mem -> iso_BAR_p_cyto_mem; Vmax_grk_GRK*iso_BAR_cyto_mem*(1/(Km_grk + iso_BAR_cyto_mem))*cyto_mem;  // modifiers: GRK_cyto; isVersionOf GO:0004703
    GRK_I = 0 pA_um_2; Km_grk = 15 molecules_um_2;
  PKA_P_PDE: PDE4_cyto -> PDE4_P_cyto; Vmax_PKA_P_PDE*0.00166113*PDE4_cyto*(1/(PKA_P_PDE_Km + 0.00166113*PDE4_cyto))*cyto*1*(1/KMOLE);  // modifiers: PKA_cyto; isVersionOf ec-code:2.7.11.11 GO:0004674
    PKA_P_PDE_Km = 0.5 uM;
  Raf_activates_MEK: MEK_cyto -> MEK_active_cyto; Vmax_Raf_activates_MEK*0.00166113*MEK_cyto*(1/(Raf_activates_MEK_Km + 0.00166113*MEK_cyto))*cyto*1*(1/KMOLE);  // modifiers: B_Raf_active_cyto; isVersionOf ec-code:2.7.11.1 GO:0004674
    Raf_activates_MEK_Km = 0.15909 uM;
  PTP_PKA: MAPK_active_cyto -> MAPK_cyto; Vmax_PTP_PKA*0.00166113*MAPK_active_cyto*(1/(PTP_PKA_Km + 0.00166113*MAPK_active_cyto))*cyto*1*(1/KMOLE);  // modifiers: PTP_PKA_cyto; isVersionOf ec-code:3.1.3.48 GO:0004725
    PTP_PKA_Km = 9 uM;
  B2: c_R2C2_cyto + cAMP_cyto -> c2_R2C2_cyto; (B2_Kf*0.00166113*c_R2C2_cyto*0.00166113*cAMP_cyto + (-(B2_Kr*0.00166113*c2_R2C2_cyto)))*cyto*1*(1/KMOLE);  // isVersionOf GO:0034199 GO:0030552
    B2_Kf = 0.0059 uM_1_s_1; B2_Kr = 0.00028 s_1;
  PTP: MAPK_active_cyto -> MAPK_cyto; Vmax_PTP*0.00166113*MAPK_active_cyto*(1/(PTP_Km + 0.00166113*MAPK_active_cyto))*cyto*1*(1/KMOLE);  // modifiers: PTP_cyto; isVersionOf ec-code:3.1.3.48 GO:0004725
    PTP_Km = 0.46 uM;
  iso_binds_BAR_g: iso_extra + BAR_G_cyto_mem -> iso_BAR_G_cyto_mem; (iso_binds_BAR_g_Kf*0.00166113*iso_extra*BAR_G_cyto_mem + (-(iso_binds_BAR_g_Kr*iso_BAR_G_cyto_mem)))*cyto_mem;  // isVersionOf GO:0031697
    iso_binds_BAR_g_I = 0 pA_um_2; iso_binds_BAR_g_Kf = 1 uM_1_s_1; iso_binds_BAR_g_Kr = 0.062 s_1;
  PPase_MAPK: MAPK_active_cyto -> MAPK_cyto; Vmax_PPase_MAPK*0.00166113*MAPK_active_cyto*(1/(PPase_MAPK_Km + 0.00166113*MAPK_active_cyto))*cyto*1*(1/KMOLE);  // modifiers: PP2A_cyto; isVersionOf ec-code:3.1.3.16 GO:0000188
    PPase_MAPK_Km = 0.77 uM;
  pp2a_4: PDE4_P_cyto -> PDE4_cyto; Vmax_pp2a_4_pp2a_4*0.00166113*PDE4_P_cyto*(1/(Km_pp2a_4 + 0.00166113*PDE4_P_cyto))*cyto*1*(1/KMOLE);  // modifiers: PP_PDE_cyto; isVersionOf GO:0006470
    Km_pp2a_4 = 8 uM;
  pp_ptp: PTP_PKA_cyto -> PTP_cyto; Vmax_pp_ptp*0.00166113*PTP_PKA_cyto*(1/(pp_ptp_Km + 0.00166113*PTP_PKA_cyto))*cyto*1*(1/KMOLE);  // modifiers: PTP_PP_cyto
    pp_ptp_Km = 6 uM;
  GRK_bg: iso_BAR_cyto_mem -> iso_BAR_p_cyto_mem; Vmax_GRK_bg_GRK_bg*iso_BAR_cyto_mem*(1/(Km_GRK_bg + iso_BAR_cyto_mem))*cyto_mem;  // modifiers: GRK_bg_cyto; isVersionOf GO:0004703
    GRK_bg_I = 0 pA_um_2; Km_GRK_bg = 4 molecules_um_2;
  G_binds_BAR: BAR_cyto_mem + G_protein_cyto -> BAR_G_cyto_mem; (Kf_G_binds_BAR*BAR_cyto_mem*0.00166113*G_protein_cyto + (-(Kr_G_binds_BAR*BAR_G_cyto_mem)))*cyto_mem;  // isVersionOf GO:0032795
    G_binds_BAR_I = 0 pA_um_2; Kf_G_binds_BAR = 0.3 uM_1_s_1; Kr_G_binds_BAR = 0.1 s_1;
  PPase_mek: MEK_active_cyto -> MEK_cyto; Vmax_PPase_mek*0.00166113*MEK_active_cyto*(1/(PPase_mek_Km + 0.00166113*MEK_active_cyto))*cyto*1*(1/KMOLE);  // modifiers: PP2A_cyto; isVersionOf ec-code:3.1.3.16 GO:0000188
    PPase_mek_Km = 15.7 uM;
  A1: c2_R2C2_cyto + cAMP_cyto -> c3_R2C2_cyto; (A1_Kf*0.00166113*c2_R2C2_cyto*0.00166113*cAMP_cyto + (-(A1_Kr*0.00166113*c3_R2C2_cyto)))*cyto*1*(1/KMOLE);  // isVersionOf GO:0030552 GO:0034199
    A1_Kf = 8.35 uM_1_s_1; A1_Kr = 0.0167 s_1;

  // Unit definitions:
  unit substance = item;
  unit volume = (1e-6 metre)^3;
  unit area = (1e-6 metre)^2;
  unit molecules = item;
  unit um2 = (1e-6 metre)^2;
  unit uM_um3_molecules_1 = 1e-6 mole / (item * litre * (1e-6 metre)^3);
  unit molecules_um_2_s_1 = item / ((1e-6 metre)^2 * second);
  unit pA_um_2 = dimensionless * ampere / metre^2;
  unit s_1 = 1 / second;
  unit _one_000000_0_m6_mol_2_s_1 = 1000000 dimensionless * metre^6 / (mole^2 * second);
  unit uM_s_1 = 1e-3 dimensionless * mole / (metre^3 * second);
  unit uM = 1e-3 dimensionless * mole / metre^3;
  unit uM_1_s_1 = 1000 dimensionless * metre^3 / (mole * second);
  unit molecules_um_2 = item / (1e-6 metre)^2;
end
