// SBML level 3 version 1
// dcterms:bibliographicCitation: http://identifiers.org/pubmed/26481970

function Function_for_PI3K_activation_deactivation_1(PI3K, aIRS, aPI3K, aRTK, k2f, k2fa, k2r)
  (k2f*aIRS + k2fa*aRTK)*PI3K - k2r*aPI3K;
end
Function_for_PI3K_activation_deactivation_1 is "Function for PI3K activation/deactivation_1";

function Function_for_mass_action_with_modifier_1(Akt, aAkt, aPI3K, k3f, k3r)
  k3f*Akt*aPI3K - k3r*aAkt;
end

function Function_for_mTOC1_acivation_deactivation_1(aAkt, amTORC1, k4f, k4r, mTORC1)
  k4f*mTORC1*aAkt - k4r*amTORC1;
end
Function_for_mTOC1_acivation_deactivation_1 is "Function for mTOC1 acivation/deactivation_1";

function Function_for_S6K_activation_deactivation_1(S6K, aS6K, amTORC1, k5f, k5r)
  k5f*S6K*amTORC1 - k5r*aS6K;
end
Function_for_S6K_activation_deactivation_1 is "Function for S6K activation/deactivation_1";

function Function_for_mass_action_with_modifier_2(IRS, aS6K, iIRS, k6f, k6r)
  k6f*IRS*aS6K - k6r*iIRS;
end

function Function_for_RTK_activation_deactivation_1(FOXO, RTK, aRTK, k7f, k7fa, k7r)
  (k7f + k7fa*FOXO)*RTK - k7r*aRTK;
end
Function_for_RTK_activation_deactivation_1 is "Function for RTK activation/deactivation_1";

function Function_for_mass_action_with_modifier_3(RasGDP, RasGTP, aRTK, k8f, k8r)
  k8f*RasGDP*aRTK - k8r*RasGTP;
end

function Function_for_mass_action_with_modifier_4(Raf, RasGTP, aRaf, k9f, k9r)
  k9f*Raf*RasGTP - k9r*aRaf;
end

function Function_for_mass_action_with_modifier_5(MEK, aMEK, aRaf, k10f, k10r)
  k10f*MEK*aRaf - k10r*aMEK;
end

function Function_for_mass_action_with_modifier_6(ERK, aERK, aMEK, k11f, k11r)
  k11f*ERK*aMEK - k11r*aERK;
end

function Function_for_mass_action_with_modifier_7(Raf, aERK, iRaf, k12f, k12r)
  k12f*Raf*aERK - k12r*iRaf;
end

function Function_for_mass_action_with_modifier_8(RTK, aERK, iRTK, k13f, k13r)
  k13f*RTK*aERK - k13r*iRTK;
end

function Function_for_mass_action_with_modifier_9(FOXO, aAkt, iFOXO, k14f, k14r)
  k14f*FOXO*aAkt - k14r*iFOXO;
end

model Nguyen2016___Feedback_regulation_in_cell_signalling__Lessons_for_cancer_therapeutics()
  // Nguyen2016 - Feedback regulation in cell signalling: Lessons for cancer therapeutics
  // Feedback regulation in cell signalling: Lessons for cancer therapeutics
  // This model is described in the article:
  // Feedback regulation in cell signalling: Lessons for cancer therapeutics.
  // Nguyen LK, Kholodenko BN.
  // Semin. Cell Dev. Biol. 2016 Feb; 50: 85-94
  // Abstract:
  // The notion of feedback is fundamental for understanding signal transduction networks. Feedback loops attenuate or amplify signals, change the network dynamics and modify the input-output relationships between the signal and the target. Negative feedback provides robustness to noise and adaptation to perturbations, but as a double-edged sword can prevent effective pathway inhibition by a drug. Positive feedback brings about switch-like network responses and can convert analog input signals into digital outputs, triggering cell fate decisions and phenotypic changes. We show how a multitude of protein-protein interactions creates hidden feedback loops in signal transduction cascades. Drug treatments that interfere with feedback regulation can cause unexpected adverse effects. Combinatorial molecular interactions generated by pathway crosstalk and feedback loops often bypass the block caused by targeted therapies against oncogenic mutated kinases. We discuss mechanisms of drug resistance caused by network adaptations and suggest that development of effective drug combinations requires understanding of how feedback loops modulate drug responses.
  // This model is hosted on BioModels Database and identified by: MODEL1708250003.
  // To cite BioModels Database, please use: BioModels Database: An enhanced, curated and annotated resource for published quantitative kinetic models.
  // To the extent possible under law, all copyright and related or neighbouring rights to this encoded model have been dedicated to the public domain worldwide. Please refer to CC0 Public Domain Dedication for more information.
  // biomodels.db:MODEL1708250003
  // biomodels.db:BIOMD0000000651
  // isDescribedBy pubmed:26481970
  // biomodels.db:BIOMD0000000651 biomodels.db:MODEL1708250003
  // isDescribedBy pubmed:26481970
  // hasTaxon taxonomy:9606
  // model units - substance: substance, time: second, volume: volume, area: area, length: metre, extent: substance

  // Compartments:
  compartment compartment = 1 volume;

  // Species:
  species IRS in compartment = 100;  // isVersionOf uniprot:P35568
  species aIRS in compartment = 0;  // isVersionOf uniprot:P35568
  species iIRS in compartment = 0;
  species PI3K in compartment = 100;  // isVersionOf uniprot:C17270
  species aPI3K in compartment = 0;  // isVersionOf ncit:C17270
  species Akt in compartment = 100;  // isVersionOf uniprot:P31749
  species aAkt in compartment = 0;  // isVersionOf uniprot:P31749
  species mTORC1 in compartment = 300;  // isVersionOf uniprot:P42345
  species amTORC1 in compartment = 0;  // isEncodedBy uniprot:P42345
  species S6K in compartment = 300;  // isVersionOf uniprot:P23443
  species aS6K in compartment = 0;  // isVersionOf uniprot:P23443
  species FOXO in compartment = 200;  // isVersionOf uniprot:Q12778
  species iFOXO in compartment = 0;  // isVersionOf uniprot:Q12778
  species RTK in compartment = 200;  // isVersionOf uniprot:Q08345
  species aRTK in compartment = 0;  // isVersionOf uniprot:Q08345
  species iRTK in compartment = 0;  // isVersionOf uniprot:Q08345
  species RasGDP in compartment = 100;  // isVersionOf uniprot:P01112
  species RasGTP in compartment = 0;  // isVersionOf uniprot:P01112
  species Raf in compartment = 100;  // isVersionOf uniprot:P04049
  species aRaf in compartment = 0;  // isVersionOf uniprot:P04049
  species iRaf in compartment = 0;  // isVersionOf uniprot:P04049
  species MEK in compartment = 300;  // isVersionOf uniprot:Q02750
  species aMEK in compartment = 0;  // isVersionOf uniprot:Q02750
  species ERK in compartment = 900;  // isVersionOf uniprot:P27361
  species aERK in compartment = 0;  // isVersionOf uniprot:P27361
  species AktI in compartment = 0;  // hasProperty CHEBI:35222
  species iAkt in compartment = 0;  // isVersionOf uniprot:P31749
  species MEKI in compartment = 0;  // hasProperty CHEBI:35222
  species iMEK in compartment = 0;  // isVersionOf uniprot:Q02750

  // Parameters:
  k1f = 0.01;
  k1r = 0.01;
  k2f = 0.001;
  k2fa = 0.001;
  k2r = 0.01;
  k3f = 0.001;
  k3r = 0.01;
  k4f = 0.001;
  k4r = 0.01;
  k5f = 0.001;
  k5r = 0.01;
  k6f = 0.1;
  k6r = 0.001;
  k7f = 0.01;
  k7fa = 0.01;
  k7r = 0.01;
  k8f = 0.001;
  k8r = 0.01;
  k9f = 0.001;
  k9r = 0.01;
  k10f = 0.001;
  k10r = 0.01;
  k11f = 0.001;
  k11r = 0.01;
  k12f = 0.01;
  k12r = 0.001;
  k13f = 0.1;
  k13r = 0.001;
  k14f = 0.1;
  k14r = 0.001;
  k15f = 0.01;
  k15r = 0.001;
  k16f = 0.01;
  k16r = 0.001;

  // Reactions:
  IRS__activation_deactivation: IRS -> aIRS; compartment*(k1f*IRS - k1r*aIRS); IRS__activation_deactivation is "IRS activation/deactivation";
  PI3K_activation_deactivation: PI3K -> aPI3K; compartment*Function_for_PI3K_activation_deactivation_1(PI3K, aIRS, aPI3K, aRTK, k2f, k2fa, k2r); PI3K_activation_deactivation is "PI3K activation/deactivation";  // modifiers: aIRS, aRTK
  Akt_activation_deactivation: Akt -> aAkt; compartment*Function_for_mass_action_with_modifier_1(Akt, aAkt, aPI3K, k3f, k3r); Akt_activation_deactivation is "Akt activation/deactivation";  // modifiers: aPI3K
  mTOC1_acivation_deactivation: mTORC1 -> amTORC1; compartment*Function_for_mTOC1_acivation_deactivation_1(aAkt, amTORC1, k4f, k4r, mTORC1); mTOC1_acivation_deactivation is "mTOC1 acivation/deactivation";  // modifiers: aAkt
  S6K_activation_deactivation: S6K -> aS6K; compartment*Function_for_S6K_activation_deactivation_1(S6K, aS6K, amTORC1, k5f, k5r); S6K_activation_deactivation is "S6K activation/deactivation";  // modifiers: amTORC1
  IRS_inhibition: IRS => iIRS; compartment*Function_for_mass_action_with_modifier_2(IRS, aS6K, iIRS, k6f, k6r);  // modifiers: aS6K
  RTK_activation_deactivation: RTK -> aRTK; compartment*Function_for_RTK_activation_deactivation_1(FOXO, RTK, aRTK, k7f, k7fa, k7r); RTK_activation_deactivation is "RTK activation/deactivation";  // modifiers: FOXO
  RasGDP__activation_deactivation: RasGDP -> RasGTP; compartment*Function_for_mass_action_with_modifier_3(RasGDP, RasGTP, aRTK, k8f, k8r); RasGDP__activation_deactivation is "RasGDP activation/deactivation";  // modifiers: aRTK
  Raf_activation_deactivation: Raf -> aRaf; compartment*Function_for_mass_action_with_modifier_4(Raf, RasGTP, aRaf, k9f, k9r); Raf_activation_deactivation is "Raf activation/deactivation";  // modifiers: RasGTP
  MEK_activation_deactivation: MEK -> aMEK; compartment*Function_for_mass_action_with_modifier_5(MEK, aMEK, aRaf, k10f, k10r); MEK_activation_deactivation is "MEK activation/deactivation";  // modifiers: aRaf
  ERK_activation_deactivation: ERK -> aERK; compartment*Function_for_mass_action_with_modifier_6(ERK, aERK, aMEK, k11f, k11r); ERK_activation_deactivation is "ERK activation/deactivation";  // modifiers: aMEK
  Raf_inhibition: Raf -> iRaf; compartment*Function_for_mass_action_with_modifier_7(Raf, aERK, iRaf, k12f, k12r);  // modifiers: aERK
  RTK_inhibition: RTK -> iRTK; compartment*Function_for_mass_action_with_modifier_8(RTK, aERK, iRTK, k13f, k13r);  // modifiers: aERK
  FOXO_inhibition: FOXO -> iFOXO; compartment*Function_for_mass_action_with_modifier_9(FOXO, aAkt, iFOXO, k14f, k14r);  // modifiers: aAkt
  Akt_inhibition: Akt + AktI -> iAkt; compartment*(k15f*Akt*AktI - k15r*iAkt);
  MEK_inhibition: MEK + MEKI -> iMEK; compartment*(k16f*MEK*MEKI - k16r*iMEK);

  // Unit definitions:
  unit volume = 1e-3 litre;
  unit substance = 1e-3 mole;
  unit area = metre^2;
end
