// SBML level 3 version 1

model BIOMD0000000007()
  // Novak1997 - Cell Cycle
  // Modeling the control of DNA replication in fission yeast.
  // This model is described in the article:
  // Modeling the control of DNA replication in fission yeast.
  // Novak B., Tyson JJ.
  // Proc. Natl. Acad. Sci. U.S.A. 1997:94(17):9147-52
  // Abstract:
  // A central event in the eukaryotic cell cycle is the decision to commence DNA replication (S phase). Strict controls normally operate to prevent repeated rounds of DNA replication without intervening mitoses ("endoreplication") or initiation of mitosis before DNA is fully replicated ("mitotic catastrophe"). Some of the genetic interactions involved in these controls have recently been identified in yeast. From this evidence we propose a molecular mechanism of "Start" control in Schizosaccharomyces pombe. Using established principles of biochemical kinetics, we compare the properties of this model in detail with the observed behavior of various mutant strains of fission yeast: wee1(-) (size control at Start), cdc13Delta and rum1(OP) (endoreplication), and wee1(-) rum1Delta (rapid division cycles of diminishing cell size). We discuss essential features of the mechanism that are responsible for characteristic properties of Start control in fission yeast, to expose our proposal to crucial experimental tests.
  // This model is hosted on BioModels Database and identified by: BIOMD0000000007 .
  // To cite BioModels Database, please use: BioModels Database: An enhanced, curated and annotated resource for published quantitative kinetic models .
  // To the extent possible under law, all copyright and related or neighbouring rights to this encoded model have been dedicated to the public domain worldwide. Please refer to CC0 Public Domain Dedication for more information.
  // biomodels.db:MODEL6614787694
  // biomodels.db:BIOMD0000000007
  // isDescribedBy pubmed:9256450
  // isDerivedFrom pubmed:10395816
  // hasTaxon taxonomy:4896
  // isVersionOf kegg.pathway:ko04110 GO:0000278
  // model units - substance: substance, time: time, volume: volume, area: area, length: metre, extent: substance

  // Compartments:
  compartment Cell = 1 volume;  // GO:0005623

  // Species:
  substanceOnly species UbE in Cell = 0.11; UbE is "ubiquitinProtease1";  // isVersionOf GO:0000502
  substanceOnly species UbE2 in Cell = 0; UbE2 is "ubiquitinProtease2";  // isVersionOf GO:0000502
  substanceOnly species Wee1 in Cell = 0;  // hasVersion uniprot:P30290 uniprot:P07527
  substanceOnly species Cdc25 in Cell = 0;  // uniprot:P06652
  substanceOnly species G2K in Cell = 0; G2K is "Cdc13_Cdc2";  // hasPart uniprot:P04551 uniprot:P10815
  substanceOnly species R in Cell = 0.4; R is "FreeRum1";  // isVersionOf uniprot:P40380
  substanceOnly species G1K in Cell = 0; G1K is "Cig2_Cdc2";  // hasPart uniprot:P04551 uniprot:P36630
  substanceOnly species IE in Cell = 0; IE is "IntermediaryEnzyme";
  substanceOnly species PG2 in Cell = 0; PG2 is "Cdc13_P-Cdc2";  // hasPart uniprot:P10815 uniprot:P04551
  substanceOnly species G1R in Cell = 0; G1R is "Cig2_Cdc2_Rum1";  // hasPart uniprot:P04551 uniprot:P36630 uniprot:P40380
  substanceOnly species G2R in Cell = 0; G2R is "Cdc13_Cdc2_Rum1";  // hasPart uniprot:P04551 uniprot:P10815 uniprot:P40380
  substanceOnly species PG2R in Cell = 0; PG2R is "Cdc13_P-Cdc2_Rum1";  // hasPart uniprot:P10815 uniprot:P04551 uniprot:P40380
  substanceOnly species SPF in Cell; SPF is "S-phasePromotingFactor";  // hasPart uniprot:P04551 uniprot:P10815 uniprot:P36630
  substanceOnly species MPF in Cell; MPF is "M-phasePromotingFactor";  // hasPart uniprot:P10815 uniprot:P04551
  substanceOnly species $IEB in Cell; IEB is "BoundIntermediaryEnzyme";
  substanceOnly species $UbEB in Cell; UbEB is "BoundUbiquitinProtease1";  // isVersionOf GO:0000502
  substanceOnly species $UbE2B in Cell; UbE2B is "BoundUbiquitinProtease2";  // isVersionOf GO:0000502
  substanceOnly species $Wee1B in Cell; Wee1B is "BoundWee1";  // hasVersion uniprot:P07527 uniprot:P30290
  substanceOnly species $Cdc25B in Cell; Cdc25B is "BoundCdc25";  // isVersionOf uniprot:P06652
  substanceOnly species Rum1Total in Cell; Rum1Total is "TotalRum1";  // uniprot:P40380
  substanceOnly species Cdc13Total in Cell; Cdc13Total is "TotalCdc13";  // uniprot:P10815
  substanceOnly species Cig2Total in Cell; Cig2Total is "TotalCig2";  // uniprot:P36630

  // Parameters:
  // mass growth rate
  mu = 0.00495;
  Mass = 0.49;
  // G2K production rate
  k1 = 0.015;
  k2prime = 0.05; k2prime is "k2'";
  // Rum1 production rate
  k3 = 0.09375;
  // Rum1 degradation rate
  k4 = 0.1875;
  // G1k production rate
  k5 = 0.00175;
  k6prime = 0; k6prime is "k6'";
  // Rum1/G2K binding rate
  k7 = 100;
  // G2R dissociation rate
  k7r = 0.1;
  // Rum1/G1K binding rate
  k8 = 10;
  k8r = 0.1;
  kc = 1;
  kcr = 0.25;
  ki = 0.4;
  kir = 0.1;
  // Rum1 Phosphorylation Rate
  kp = 3.25;
  ku = 0.2;
  kur = 0.1;
  ku2 = 1;
  kur2 = 0.3;
  kw = 1;
  kwr = 0.25;
  V2 = 0.25;
  V2prime = 0.0075; V2prime is "V2'";
  V6 = 7.5;
  V6prime = 0.0375; V6prime is "V6'";
  V25 = 0.5;
  V25prime = 0.025; V25prime is "V25'";
  Vw = 0.35;
  Vwprime = 0.035; Vwprime is "Vw'";
  Kmc = 0.1;
  Kmcr = 0.1;
  Kmi = 0.01;
  Kmir = 0.01;
  Kmp = 0.001;
  Kmu = 0.01;
  Kmur = 0.01;
  Kmu2 = 0.05;
  Kmur2 = 0.05;
  Kmw = 0.1;
  Kmwr = 0.1;
  alpha = 0.25;
  beta = 0.05;
  Cig1 = 0;

  // Assignment rules:
  IEB := 1 - IE;
  UbEB := 1 - UbE;
  UbE2B := 1 - UbE2;
  Wee1B := 1 - Wee1;
  Cdc25B := 1 - Cdc25;
  Rum1Total := G1R + G2R + PG2R + R;
  Cdc13Total := G2K + G2R + PG2 + PG2R;
  Cig2Total := G1K + G1R;
  k2 := UbE*V2 + (1 - UbE)*V2prime;
  k6 := UbE2*V6 + (1 - UbE2)*V6prime;
  kwee := Vwprime*(1 - Wee1) + Vw*Wee1;
  k25 := Cdc25*V25 + (1 - Cdc25)*V25prime;
  MPF := G2K + beta*PG2;
  SPF := Cig1 + alpha*G1K + MPF;

  // Rate rules:
  Mass' = Mass*mu;

  // Reactions:
  G2K_Creation: => G2K; k1; G2K_Creation is "Cdc13_Cdc2 creation";
  G1K_Creation: => G1K; k5; G1K_Creation is "Cig2_Cdc2 creation";
  Cdc2Phos: G2K -> PG2; G2K*kwee - k25*PG2; Cdc2Phos is "Cdc2 phosphorylation";  // modifiers: Wee1, Cdc25; hasPart reactome:REACT_6294 reactome:REACT_6327; hasPart reactome:REACT_6257 reactome:REACT_6178; isVersionOf ec-code:2.7.10.2 GO:0006468
  G2R_Creation: G2K + R -> G2R; G2K*k7*R - G2R*k7r; G2R_Creation is "binding of Rum1 with Cdc13_Cdc2";  // isVersionOf GO:0006461
  PG2R_Creation: PG2 + R -> PG2R; k7*PG2*R - k7r*PG2R; PG2R_Creation is "binding of Rum1 with Cdc13_P-Cdc2";  // isVersionOf GO:0006461
  Rum1DegInG2R: G2R => G2K; G2R*k4; Rum1DegInG2R is "Rum1 degradation in Rum1_Cdc13_Cdc2";  // isVersionOf GO:0030163
  Rum1Deg: R => ; k4*R; Rum1Deg is "Rum1 degradation in solution";  // isVersionOf GO:0030163
  Rum1DegInPG2R: PG2R => PG2; k4*PG2R; Rum1DegInPG2R is "Rum1 degradation in Rum1_Cdc13_P-Cdc2";  // isVersionOf GO:0030163
  RumDegInG1R: G1R => G1K; G1R*k4; RumDegInG1R is "Rum1 degradation in Rum1_Cig2_Cdc2";  // isVersionOf GO:0030163
  G2K_dissoc: G2K => ; G2K*k2; G2K_dissoc is "Cdc13 degradation in Cdc13_Cdc2";  // modifiers: UbE; isVersionOf GO:0008054
  PG2_dissoc: PG2 => ; k2*PG2; PG2_dissoc is "Cdc13 degradation in Cdc13_P-Cdc2";  // modifiers: UbE; isVersionOf GO:0008054
  G1K_Dissociation: G1K => ; G1K*k6; G1K_Dissociation is "Cig2 degradation in Cig2_Cdc2";  // modifiers: UbE2; isVersionOf GO:0008054
  PG2R_Dissociation: PG2R => R; k2prime*PG2R; PG2R_Dissociation is "Cdc13 degradation in Rum1_Cdc13_P-Cdc2";  // isVersionOf GO:0008054
  G2R_Dissociation: G2R => R; G2R*k2prime; G2R_Dissociation is "Cdc13 degradation in Rum1_Cdc13_Cdc2";  // isVersionOf GO:0008054
  G1R_Dissociation: G1R => R; G1R*k6prime; G1R_Dissociation is "Cig2 degradation in Rum1_Cig2_Cdc2";  // isVersionOf GO:0008054
  G1R_Binding: G1K + R -> G1R; G1K*k8*R - G1R*k8r; G1R_Binding is "Binding of Rum1 to Cig2_Cdc2";  // isVersionOf GO:0006461
  G2R_Dissociation_UbE: G2R => R; G2R*k2; G2R_Dissociation_UbE is "UbE mediated degradation of Cdc13_Cdc2 in Rum1_Cdc13_Cdc2";  // modifiers: UbE; isVersionOf kegg.pathway:spo04120 GO:0030163
  PG2R_Dissociation_UbE: PG2R => R; k2*PG2R; PG2R_Dissociation_UbE is "UbE mediated degradation of Cdc13_Cdc2 in Rum1_Cdc13_P-Cdc2";  // modifiers: UbE; isVersionOf kegg.pathway:spo04120 GO:0030163
  Rum1_Production: => R; k3; Rum1_Production is "Rum1 creation";
  Rum1_Deg_SPF: R => ; kp*Mass*R*SPF/(Kmp + R); Rum1_Deg_SPF is "Rum1 degradation by SPF";  // modifiers: SPF; isVersionOf GO:0030163
  IE_Reaction: $IEB -> IE; IEB*ki*MPF/(IEB + Kmi) - IE*kir/(IE + Kmir); IE_Reaction is "IE production & degradation";  // modifiers: MPF
  UbE_Reaction: $UbEB -> UbE; IE*ku*UbEB/(Kmu + UbEB) - kur*UbE/(Kmur + UbE); UbE_Reaction is "UbE production & degradation";  // modifiers: IE
  UbE2_Reaction: $UbE2B -> UbE2; ku2*MPF*UbE2B/(Kmu2 + UbE2B) - kur2*UbE2/(Kmur2 + UbE2); UbE2_Reaction is "UbE2 production & degradation";  // modifiers: MPF
  Wee1_Reaction: $Wee1B -> Wee1; kwr*Wee1B/(Kmwr + Wee1B) - kw*MPF*Wee1/(Kmw + Wee1); Wee1_Reaction is "Wee1 production & degradation";  // modifiers: MPF
  Cdc25_Reaction: $Cdc25B -> Cdc25; Cdc25B*kc*MPF/(Cdc25B + Kmc) - Cdc25*kcr/(Cdc25 + Kmcr); Cdc25_Reaction is "Cdc25 production & degradation";  // modifiers: MPF

  // Events:
  Start: at (60) after (SPF >= 0.1): kp = kp/2; Start is "S-Phase Start";  // GO:0045750
  Division: at (UbE <= 0.1): kp = 2*kp, Mass = Mass/2; Division is "Cell Division";  // GO:0051301

  // Unit definitions:
  unit time = 60 second; time is "minutes";
  unit volume = litre;
  unit substance = mole;
  unit area = metre^2;
end
